# OpenSim document version 30000
ScaleTool 3DGaitModel2392-scaled:
  mass: 57.5823 [kg]
  height: -1
  age: -1
  ModelScaler:
    apply: true
    scaling_order: measurements manualScale
    marker_file: C:/Users/u0088756/Documents/documenten/fwo_project_balance/Data/SyncDataCardiff_Elderly/osimData/pp_8/model/../Static.trc
    time_range: 2 2.05
    preserve_mass_distribution: true
    MeasurementSet:
      Measurement pelvis: apply=true
        MarkerPair: markers=(RASI LASI)
        BodyScale pelvis: axes=(X Y Z)
      Measurement femur: apply=true
        MarkerPair: markers=(RKNE RASI)
        MarkerPair: markers=(LKNE LASI)
        BodyScale femur_r: axes=(X Y Z)
        BodyScale femur_l: axes=(X Y Z)
      Measurement tibia: apply=true
        MarkerPair: markers=(RKNE RANK)
        MarkerPair: markers=(LKNE LANK)
        BodyScale tibia_r: axes=(X Y Z)
        BodyScale tibia_l: axes=(X Y Z)
      Measurement torso: apply=true
        MarkerPair: markers=(RSHO LSHO)
        BodyScale torso: axes=(X Y Z)
      Measurement humerus: apply=true
        MarkerPair: markers=(RSHO RELB)
        MarkerPair: markers=(LSHO LELB)
        BodyScale humerus_r: axes=(X Y Z)
        BodyScale humerus_l: axes=(X Y Z)
      Measurement ulna: apply=true
        MarkerPair: markers=(LELB LWRA)
        BodyScale ulna_r: axes=(X Y Z)
        BodyScale ulna_l: axes=(X Y Z)
      Measurement radius: apply=true
        MarkerPair: markers=(LELB LWRA)
        BodyScale radius_r: axes=(X Y Z)
        BodyScale radius_l: axes=(X Y Z)
      Measurement hand: apply=true
        MarkerPair: markers=(LWRA LWRB)
        MarkerPair: markers=(RWRA RWRB)
        BodyScale hand_r: axes=(X Y Z)
        BodyScale hand_l: axes=(X Y Z)
      Measurement Unnamed: apply=false
    ScaleSet:
      Scale: scales=(0.95 0.95 0.95) segment=pelvis apply=true
      Scale: scales=(0.95 0.95 0.95) segment=talus_r apply=true
      Scale: scales=(0.95 0.95 0.95) segment=calcn_r apply=true
      Scale: scales=(0.95 0.95 0.95) segment=toes_r apply=true
      Scale: scales=(0.95 0.95 0.95) segment=talus_l apply=true
      Scale: scales=(0.95 0.95 0.95) segment=calcn_l apply=true
      Scale: scales=(0.95 0.95 0.95) segment=toes_l apply=true
      Scale: scales=(0.9 0.9 0.9) segment=ulna_r apply=true
      Scale: scales=(0.9 0.9 0.9) segment=radius_r apply=true
      Scale: scales=(0.95 0.95 0.95) segment=hand_r apply=true
      Scale: scales=(0.9 0.9 0.9) segment=ulna_l apply=true
      Scale: scales=(0.9 0.9 0.9) segment=radius_l apply=true
      Scale: scales=(0.95 0.95 0.95) segment=hand_l apply=true
  MarkerPlacer:
    apply: true
    marker_file: C:/Users/u0088756/Documents/documenten/fwo_project_balance/Data/SyncDataCardiff_Elderly/osimData/pp_8/model/../Static.trc
    time_range: 2 2.05
    max_marker_movement: -1
    IKTaskSet:
      IKMarkerTask RASI: apply=true weight=20
      IKMarkerTask LASI: apply=true weight=20
      IKMarkerTask CLAV: apply=true weight=10
      IKMarkerTask RSHO: apply=true weight=10
      IKMarkerTask LSHO: apply=true weight=10
      IKMarkerTask RKNE: apply=true weight=30
      IKMarkerTask RKNEmed: apply=true weight=1
      IKMarkerTask RTHI: apply=false weight=1
      IKMarkerTask RTHI2: apply=false weight=1
      IKMarkerTask RTHI3: apply=false weight=1
      IKMarkerTask RANK: apply=true weight=30
      IKMarkerTask RANKmed: apply=true weight=1
      IKMarkerTask RTIB: apply=false weight=1
      IKMarkerTask RTIB2: apply=false weight=1
      IKMarkerTask RTIB3: apply=false weight=1
      IKMarkerTask RTOE: apply=false weight=30
      IKMarkerTask RHEE: apply=true weight=30
      IKMarkerTask RLatFoot: apply=false weight=1
      IKMarkerTask LKNE: apply=true weight=30
      IKMarkerTask LKNEmed: apply=true weight=1
      IKMarkerTask LTHI: apply=false weight=1
      IKMarkerTask LTHI2: apply=false weight=1
      IKMarkerTask LTHI3: apply=false weight=1
      IKMarkerTask LANK: apply=true weight=30
      IKMarkerTask LANKmed: apply=true weight=1
      IKMarkerTask LTIB: apply=false weight=1
      IKMarkerTask LTIB2: apply=false weight=1
      IKMarkerTask LTIB3: apply=false weight=1
      IKMarkerTask LTOE: apply=true weight=30
      IKMarkerTask LHEE: apply=true weight=30
      IKMarkerTask LLatFoot: apply=false weight=1
      IKMarkerTask RELB: apply=true weight=10
      IKMarkerTask LELB: apply=true weight=10
      IKMarkerTask RWRA: apply=true weight=1
      IKMarkerTask RWRB: apply=true weight=1
      IKMarkerTask LWRA: apply=true weight=1
      IKMarkerTask LWRB: apply=true weight=1
      IKMarkerTask RPSI: apply=true weight=10
      IKMarkerTask LPSI: apply=true weight=10
      IKMarkerTask SACR: apply=false weight=10
      IKMarkerTask C7: apply=true weight=30
      IKMarkerTask T10: apply=false weight=1
      IKMarkerTask RBAK: apply=false weight=1
      IKMarkerTask LFHD: apply=false weight=1
      IKMarkerTask RFHD: apply=false weight=1
      IKMarkerTask LBHD: apply=false weight=1
      IKMarkerTask RBHD: apply=false weight=1
      IKMarkerTask STRN: apply=false weight=1
      IKMarkerTask LFIN: apply=false weight=1
      IKMarkerTask RFIN: apply=true weight=1
      IKMarkerTask LUA1: apply=false weight=1
      IKMarkerTask LUA2: apply=false weight=1
      IKMarkerTask LUA3: apply=false weight=1
      IKMarkerTask LLA1: apply=false weight=1
      IKMarkerTask LLA2: apply=false weight=1
      IKMarkerTask LLA3: apply=false weight=1
      IKMarkerTask RUA1: apply=false weight=1
      IKMarkerTask RUA2: apply=false weight=1
      IKMarkerTask RUA3: apply=false weight=1
      IKMarkerTask RLA1: apply=false weight=1
      IKMarkerTask RLA2: apply=false weight=1
      IKMarkerTask RLA3: apply=false weight=1
      IKCoordinateTask [values shared by the 7 below unless stated]: apply=true weight=2 value_type=manual_value
          value=0
      IKCoordinateTask pelvis_tilt
      IKCoordinateTask pelvis_rotation: apply=false
      IKCoordinateTask hip_rotation_r
      IKCoordinateTask ankle_angle_r
      IKCoordinateTask hip_rotation_l: weight=0
      IKCoordinateTask knee_angle_l
      IKCoordinateTask ankle_angle_l
