# OpenSim document version 30000
ScaleTool 3DGaitModel2392-scaled:
  mass: 96.8904 [kg]
  height: -1
  age: -1
  ModelScaler:
    apply: true
    scaling_order: measurements manualScale
    marker_file: E:/SyncDataCardiff/osimData/Patient2/model/../Static.trc
    time_range: 0.005 9
    preserve_mass_distribution: true
    MeasurementSet:
      Measurement pelvis: apply=true
        MarkerPair: markers=(RASI LASI)
        BodyScale pelvis: axes=(X Y Z)
      Measurement femur: apply=true
        MarkerPair: markers=(RKNE RASI)
        MarkerPair: markers=(LKNE LASI)
        BodyScale femur_r: axes=(X Y Z)
        BodyScale femur_l: axes=(X Y Z)
      Measurement tibia: apply=true
        MarkerPair: markers=(RKNE RANK)
        MarkerPair: markers=(LKNE LANK)
        BodyScale tibia_r: axes=(X Y Z)
        BodyScale tibia_l: axes=(X Y Z)
      Measurement torso: apply=true
        MarkerPair: markers=(RSHO LSHO)
        BodyScale torso: axes=(X Y Z)
      Measurement humerus: apply=true
        MarkerPair: markers=(RSHO RELB)
        MarkerPair: markers=(LSHO LELB)
        BodyScale humerus_r: axes=(X Y Z)
        BodyScale humerus_l: axes=(X Y Z)
      Measurement ulna: apply=true
        MarkerPair: markers=(LWRA LELB)
        MarkerPair: markers=(RWRA RELB)
        BodyScale ulna_r: axes=(X Y Z)
        BodyScale ulna_l: axes=(X Y Z)
      Measurement radius: apply=true
        MarkerPair: markers=(RWRA RELB)
        MarkerPair: markers=(LWRA LELB)
        BodyScale radius_r: axes=(X Y Z)
        BodyScale radius_l: axes=(X Y Z)
      Measurement hand: apply=true
        MarkerPair: markers=(LWRA LWRB)
        MarkerPair: markers=(RWRA RWRB)
        BodyScale hand_r: axes=(X Y Z)
        BodyScale hand_l: axes=(X Y Z)
      Measurement Unnamed: apply=false
    ScaleSet:
      Scale: scales=(1 1 1) segment=ground apply=true
      Scale: scales=(1 1 1) segment=pelvis apply=true
      Scale: scales=(1 1 1) segment=femur_r apply=true
      Scale: scales=(1 1 1) segment=tibia_r apply=true
      Scale: scales=(1 1 1) segment=talus_r apply=true
      Scale: scales=(1 1 1) segment=calcn_r apply=true
      Scale: scales=(1 1 1) segment=toes_r apply=true
      Scale: scales=(1 1 1) segment=femur_l apply=true
      Scale: scales=(1 1 1) segment=tibia_l apply=true
      Scale: scales=(1 1 1) segment=talus_l apply=true
      Scale: scales=(1 1 1) segment=calcn_l apply=true
      Scale: scales=(1 1 1) segment=toes_l apply=true
      Scale: scales=(1 1 1) segment=torso apply=true
      Scale: scales=(1 1 1) segment=humerus_r apply=true
      Scale: scales=(1 1 1) segment=ulna_r apply=true
      Scale: scales=(1 1 1) segment=radius_r apply=true
      Scale: scales=(1 1 1) segment=hand_r apply=true
      Scale: scales=(1 1 1) segment=humerus_l apply=true
      Scale: scales=(1 1 1) segment=ulna_l apply=true
      Scale: scales=(1 1 1) segment=radius_l apply=true
      Scale: scales=(1 1 1) segment=hand_l apply=true
  MarkerPlacer:
    apply: true
    marker_file: ../Static.trc
    time_range: 1 1.05
    max_marker_movement: -1
    IKTaskSet:
      IKMarkerTask RASI: apply=true weight=20
      IKMarkerTask LASI: apply=true weight=20
      IKMarkerTask CLAV: apply=true weight=10
      IKMarkerTask RSHO: apply=true weight=10
      IKMarkerTask LSHO: apply=true weight=10
      IKMarkerTask RKNE: apply=true weight=30
      IKMarkerTask RKNEmed: apply=true weight=1
      IKMarkerTask RTHI: apply=false weight=1
      IKMarkerTask RTHI2: apply=false weight=1
      IKMarkerTask RTHI3: apply=false weight=1
      IKMarkerTask RANK: apply=true weight=30
      IKMarkerTask RANKmed: apply=true weight=1
      IKMarkerTask RTIB: apply=false weight=1
      IKMarkerTask RTIB2: apply=false weight=1
      IKMarkerTask RTIB3: apply=false weight=1
      IKMarkerTask RTOE: apply=true weight=30
      IKMarkerTask RHEE: apply=true weight=30
      IKMarkerTask RLatFoot: apply=false weight=1
      IKMarkerTask LKNE: apply=true weight=30
      IKMarkerTask LKNEmed: apply=true weight=1
      IKMarkerTask LTHI: apply=false weight=1
      IKMarkerTask LTHI2: apply=false weight=1
      IKMarkerTask LTHI3: apply=false weight=1
      IKMarkerTask LANK: apply=true weight=30
      IKMarkerTask LANKmed: apply=true weight=1
      IKMarkerTask LTIB: apply=false weight=1
      IKMarkerTask LTIB2: apply=false weight=1
      IKMarkerTask LTIB3: apply=false weight=1
      IKMarkerTask LTOE: apply=true weight=30
      IKMarkerTask LHEE: apply=true weight=30
      IKMarkerTask LLatFoot: apply=false weight=1
      IKMarkerTask RELB: apply=true weight=10
      IKMarkerTask LELB: apply=true weight=10
      IKMarkerTask RWRA: apply=true weight=1
      IKMarkerTask RWRB: apply=true weight=1
      IKMarkerTask LWRA: apply=true weight=1
      IKMarkerTask LWRB: apply=true weight=1
      IKMarkerTask RPSI: apply=true weight=10
      IKMarkerTask LPSI: apply=true weight=10
      IKMarkerTask C7: apply=true weight=30
      IKMarkerTask LFHD: apply=true weight=1
      IKMarkerTask RFHD: apply=true weight=1
      IKMarkerTask LBHD: apply=true weight=1
      IKMarkerTask LFIN: apply=true weight=1
      IKMarkerTask RFIN: apply=true weight=1
      IKMarkerTask LUA1: apply=false weight=1
      IKMarkerTask LLA1: apply=false weight=1
      IKMarkerTask RUA1: apply=false weight=1
      IKMarkerTask RLA1: apply=false weight=1
