# OpenSim document version 30000
Model 3DGaitModel2392-scaled:
  length_units: meters
  force_units: N
  gravity: 0 -9.80665 0
  credits:
    Delp S.L., Loan J.P., Hoy M.G., Zajac F.E., Topp E.L., Rosen J.M., Thelen D.G., Anderson F.C., Seth A.
  publications:
    Notes: 3D, 23 DOF gait model created by D.G. Thelen, Univ. of Wisconsin-Madison, and Ajay Seth, Frank C. Anderson, and Scott L. Delp, Stanford University. Lower extremity joint defintions based on Delp et al. (1990). Low back joint and anthropometry based on Anderson and Pandy (1999, 2001). Planar knee model of Yamaguchi and Zajac (1989). Seth removed the patella to avoid kinematic constraints; insertions of the quadrucepts are handled with moving points in the tibia frame. Delp, S.L., Loan, J.P., Hoy, M.G., Zajac, F.E., Topp E.L., Rosen, J.M.: An interactive graphics-based model of the lower extremity to study orthopaedic surgical procedures, IEEE Transactions on Biomedical Engineering, vol. 37, pp. 757-767, 1990. Yamaguchi G.T., Zajac F.E.: A planar model of the knee joint to characterize the knee extensor mechanism." J . Biomecl7. vol. 21. pp. 1-10. 1989. Anderson F.C., Pandy M.G.: A dynamic optimization solution for vertical jumping in three dimensions. Computer Methods in Biomechanics and Biomedical Engineering 2:201-231, 1999. Anderson F.C., Pandy M.G.: Dynamic optimization of human walking. Journal of Biomechanical Engineering 123:381-390, 2001.
  BodySet:
    Body ground: mass=0 mass_center=(0 0 0) inertia_xx=0 inertia_yy=0 inertia_zz=0 meshes=treadmill.vtp
    Body treadmill: mass=1000000 mass_center=(0 0 0) inertia_xx=0 inertia_yy=0 inertia_zz=0 meshes=treadmill.vtp
      CustomJoint ground_treadmill: parent_body=ground location_in_parent=(2 0 0.4) location=(0 0 0)
        SpatialTransform: axes_held_at_zero=(rotation1 rotation2 rotation3 translation2 translation3)
          TransformAxis translation1: coordinates=treadmill_tx axis=(1 0 0) LinearFunction(coefficients=1 0)
        Coordinate treadmill_tx: motion_type=translational default_value=0 range=(-200 200) clamped=false
            prescribed=true
          prescribed_function: PiecewiseLinearFunction: x=(44.305 44.31 44.315 44.32 44.325 44.33 44.335 44.34 44.345 44.35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)
              y=(0 0.0051 0.01015 0.01528 0.02037 0.02548 0.03054 0.03563 0.04058 0.04561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)
    Body pelvis: mass=13.81876 mass_center=(-0.0652793 0 0) inertia_xx=0.1028348 inertia_yy=0.08712951
        inertia_zz=0.05791962 meshes=(sacrum.vtp pelvis.vtp l_pelvis.vtp)
      CustomJoint ground_pelvis: parent_body=ground location_in_parent=(0 0 0) location=(0 0 0)
        Coordinate pelvis_tilt: motion_type=rotational default_value=0 range=(-1.570796 1.570796) clamped=true
        Coordinate pelvis_list: motion_type=rotational default_value=0 range=(-1.570796 1.570796) clamped=true
        Coordinate pelvis_rotation: motion_type=rotational default_value=0 range=(-3.1416 3.1416) clamped=true
        Coordinate pelvis_tx: motion_type=translational default_value=0 range=(-5 5) clamped=true
        Coordinate pelvis_ty: motion_type=translational default_value=0.93 range=(-1 2) clamped=true
        Coordinate pelvis_tz: motion_type=translational default_value=0 range=(-3 3) clamped=true
        SpatialTransform:
          TransformAxis rotation1: coordinates=pelvis_tilt axis=(0 0 1) LinearFunction(coefficients=1 0)
          TransformAxis rotation2: coordinates=pelvis_list axis=(1 0 0) LinearFunction(coefficients=1 0)
          TransformAxis rotation3: coordinates=pelvis_rotation axis=(0 1 0) LinearFunction(coefficients=1 0)
          TransformAxis translation1: coordinates=pelvis_tx axis=(1 0 0) LinearFunction(coefficients=1 0)
          TransformAxis translation2: coordinates=pelvis_ty axis=(0 1 0) LinearFunction(coefficients=1 0)
          TransformAxis translation3: coordinates=pelvis_tz axis=(0 0 1) LinearFunction(coefficients=1 0)
    Body femur_r: mass=10.91397 mass_center=(0 -0.174176 0) inertia_xx=0.1649279 inertia_yy=0.04323353
        inertia_zz=0.1739195 meshes=femur_r.vtp
      CustomJoint hip_r: parent_body=pelvis location_in_parent=(-0.06527935 -0.06103204 0.07709796) location=(0 0 0)
        Coordinate hip_flexion_r: motion_type=rotational default_value=0 range=(-2.094395 2.094395) clamped=true
        Coordinate hip_adduction_r: motion_type=rotational default_value=0 range=(-2.094395 2.094395) clamped=true
        Coordinate hip_rotation_r: motion_type=rotational default_value=0 range=(-2.094395 2.094395) clamped=true
        SpatialTransform: axes_held_at_zero=(translation1 translation2 translation3)
          TransformAxis rotation1: coordinates=hip_flexion_r axis=(0 0 1) LinearFunction(coefficients=1 0)
          TransformAxis rotation2: coordinates=hip_adduction_r axis=(1 0 0) LinearFunction(coefficients=1 0)
          TransformAxis rotation3: coordinates=hip_rotation_r axis=(0 1 0) LinearFunction(coefficients=1 0)
    Body tibia_r: mass=4.350262 mass_center=(0 -0.19203 0) inertia_xx=0.06256271 inertia_yy=0.00633075
        inertia_zz=0.06343163 meshes=(tibia_r.vtp fibula_r.vtp)
      CustomJoint knee_r: parent_body=femur_r location_in_parent=(0 0 0) location=(0 0 0)
        Coordinate knee_angle_r: motion_type=rotational default_value=0 range=(-2.094395 0.1745329) clamped=true
        SpatialTransform: axes_held_at_zero=(rotation2 rotation3 translation3)
          TransformAxis rotation1: coordinates=knee_angle_r axis=(0 0 1) LinearFunction(coefficients=1 0)
          TransformAxis translation1: coordinates=knee_angle_r axis=(1 0 0)
            MultiplierFunction: scale=1.024565
              SimmSpline: x=(-2.0944 -1.74533 -1.39626 -1.0472 -0.698132 -0.349066 -0.174533 0.197344 0.337395 0.490178 1.52146 2.0944)
                  y=(-0.0032 0.00179 0.00411 0.0041 0.00212 -0.001 -0.0031 -0.005227 -0.005435 -0.005574 -0.005435 -0.00525)
          TransformAxis translation2: coordinates=knee_angle_r axis=(0 1 0)
            MultiplierFunction: scale=1.024565
              SimmSpline: x=(-2.0944 -1.22173 -0.523599 -0.349066 -0.174533 0.159149 2.0944)
                  y=(-0.4226 -0.4082 -0.399 -0.3976 -0.3966 -0.395264 -0.396)
    Body talus_r: mass=0.1173368 mass_center=(0 0 0) inertia_xx=0.0009557156 inertia_yy=0.0009557156
        inertia_zz=0.0009557156 meshes=talus.vtp
      CustomJoint ankle_r: parent_body=tibia_r location_in_parent=(0 -0.4422764 0) location=(0 0 0)
        Coordinate ankle_angle_r: motion_type=rotational default_value=0 range=(-1.570796 1.570796) clamped=true
        SpatialTransform: axes_held_at_zero=(rotation2 rotation3 translation1 translation2 translation3)
          TransformAxis rotation1: coordinates=ankle_angle_r axis=(-0.1050135 -0.1740224 0.9791263)
              LinearFunction(coefficients=1 0)
    Body calcn_r: mass=1.46671 mass_center=(0.09025 0.027075 0) inertia_xx=0.001338002 inertia_yy=0.003727291
        inertia_zz=0.003918434 meshes=foot.vtp
      CustomJoint subtalar_r: parent_body=talus_r location_in_parent=(-0.04401493 -0.03785988 0.0071478)
          location=(0 0 0)
        Coordinate subtalar_angle_r: motion_type=rotational default_value=0 range=(-1.570796 1.570796) clamped=true
            locked=true
        SpatialTransform: axes_held_at_zero=(rotation2 rotation3 translation1 translation2 translation3)
          TransformAxis rotation1: coordinates=subtalar_angle_r axis=(0.7871796 0.6047475 -0.1209495)
              LinearFunction(coefficients=1 0)
    Body toes_r: mass=0.2541515 mass_center=(0.0312265 0.005415 -0.0157937) inertia_xx=9.557156e-5
        inertia_yy=0.0001911431 inertia_zz=0.0009557156 meshes=bofoot.vtp
      CustomJoint mtp_r: parent_body=calcn_r location_in_parent=(0.161367 -0.001805 0.0009747) location=(0 0 0)
        Coordinate mtp_angle_r: motion_type=rotational default_value=0 range=(-1.570796 1.570796) clamped=true
            locked=true
        SpatialTransform: axes_held_at_zero=(rotation2 rotation3 translation1 translation2 translation3)
          TransformAxis rotation1: coordinates=mtp_angle_r axis=(-0.5809544 0 0.8139361)
              LinearFunction(coefficients=1 0)
    Body femur_l: mass=10.91397 mass_center=(0 -0.174176 0) inertia_xx=0.1649279 inertia_yy=0.04323353
        inertia_zz=0.1739195 meshes=l_femur.vtp
      CustomJoint hip_l: parent_body=pelvis location_in_parent=(-0.06527935 -0.06103204 -0.07709796) location=(0 0 0)
        Coordinate hip_flexion_l: motion_type=rotational default_value=0 range=(-2.094395 2.094395) clamped=true
        Coordinate hip_adduction_l: motion_type=rotational default_value=0 range=(-2.094395 2.094395) clamped=true
        Coordinate hip_rotation_l: motion_type=rotational default_value=0 range=(-2.094395 2.094395) clamped=true
        SpatialTransform: axes_held_at_zero=(translation1 translation2 translation3)
          TransformAxis rotation1: coordinates=hip_flexion_l axis=(0 0 1) LinearFunction(coefficients=1 0)
          TransformAxis rotation2: coordinates=hip_adduction_l axis=(-1 0 0) LinearFunction(coefficients=1 0)
          TransformAxis rotation3: coordinates=hip_rotation_l axis=(0 -1 0) LinearFunction(coefficients=1 0)
    Body tibia_l: mass=4.350262 mass_center=(0 -0.19203 0) inertia_xx=0.06256271 inertia_yy=0.00633075
        inertia_zz=0.06343163 meshes=(l_tibia.vtp l_fibula.vtp)
      CustomJoint knee_l: parent_body=femur_l location_in_parent=(0 0 0) location=(0 0 0)
        Coordinate knee_angle_l: motion_type=rotational default_value=0 range=(-2.094395 0.1745329) clamped=true
        SpatialTransform: axes_held_at_zero=(rotation2 rotation3 translation3)
          TransformAxis rotation1: coordinates=knee_angle_l axis=(0 0 1) LinearFunction(coefficients=1 0)
          TransformAxis translation1: coordinates=knee_angle_l axis=(1 0 0)
            MultiplierFunction: scale=1.024565
              SimmSpline: x=(-2.0944 -1.74533 -1.39626 -1.0472 -0.698132 -0.349066 -0.174533 0.197344 0.337395 0.490178 1.52146 2.0944)
                  y=(-0.0032 0.00179 0.00411 0.0041 0.00212 -0.001 -0.0031 -0.005227 -0.005435 -0.005574 -0.005435 -0.00525)
          TransformAxis translation2: coordinates=knee_angle_l axis=(0 1 0)
            MultiplierFunction: scale=1.024565
              SimmSpline: x=(-2.0944 -1.22173 -0.523599 -0.349066 -0.174533 0.159149 2.0944)
                  y=(-0.4226 -0.4082 -0.399 -0.3976 -0.3966 -0.395264 -0.396)
    Body talus_l: mass=0.1173368 mass_center=(0 0 0) inertia_xx=0.0009557156 inertia_yy=0.0009557156
        inertia_zz=0.0009557156 meshes=l_talus.vtp
      CustomJoint ankle_l: parent_body=tibia_l location_in_parent=(0 -0.4422764 0) location=(0 0 0)
        Coordinate ankle_angle_l: motion_type=rotational default_value=0 range=(-1.047198 1.047198) clamped=true
        SpatialTransform: axes_held_at_zero=(rotation2 rotation3 translation1 translation2 translation3)
          TransformAxis rotation1: coordinates=ankle_angle_l axis=(0.1050135 0.1740224 0.9791263)
              LinearFunction(coefficients=1 0)
    Body calcn_l: mass=1.46671 mass_center=(0.09025 0.027075 0) inertia_xx=0.001338002 inertia_yy=0.003727291
        inertia_zz=0.003918434 meshes=l_foot.vtp
      CustomJoint subtalar_l: parent_body=talus_l location_in_parent=(-0.04401493 -0.03785988 -0.0071478)
          location=(0 0 0)
        Coordinate subtalar_angle_l: motion_type=rotational default_value=0 range=(-1.570796 1.570796) clamped=true
            locked=true
        SpatialTransform: axes_held_at_zero=(rotation2 rotation3 translation1 translation2 translation3)
          TransformAxis rotation1: coordinates=subtalar_angle_l axis=(-0.7871796 -0.6047475 -0.1209495)
              LinearFunction(coefficients=1 0)
    Body toes_l: mass=0.2541515 mass_center=(0.0312265 0.005415 0.0157937) inertia_xx=9.557156e-5
        inertia_yy=0.0001911431 inertia_zz=0.0009557156 meshes=l_bofoot.vtp
      CustomJoint mtp_l: parent_body=calcn_l location_in_parent=(0.161367 -0.001805 -0.0009747) location=(0 0 0)
        Coordinate mtp_angle_l: motion_type=rotational default_value=0 range=(-1.047198 1.047198) clamped=true
            locked=true
        SpatialTransform: axes_held_at_zero=(rotation2 rotation3 translation1 translation2 translation3)
          TransformAxis rotation1: coordinates=mtp_angle_l axis=(0.5809544 0 0.8139361)
              LinearFunction(coefficients=1 0)
    Body torso: mass=40.17213 mass_center=(-0.0334544 0.356847 0) inertia_xx=2.151503 inertia_yy=1.102381
        inertia_zz=2.088614 meshes=(hat_spine.vtp hat_jaw.vtp hat_skull.vtp hat_ribs.vtp)
      CustomJoint back: parent_body=pelvis location_in_parent=(-0.09297922 0.0752513 0) location=(0 0 0)
        Coordinate lumbar_extension: motion_type=rotational default_value=0 range=(-1.570796 1.570796) clamped=true
        Coordinate lumbar_bending: motion_type=rotational default_value=0 range=(-1.570796 1.570796) clamped=true
        Coordinate lumbar_rotation: motion_type=rotational default_value=0 range=(-1.570796 1.570796) clamped=true
        SpatialTransform: axes_held_at_zero=(translation1 translation2 translation3)
          TransformAxis rotation1: coordinates=lumbar_extension axis=(0 0 1) LinearFunction(coefficients=1 0)
          TransformAxis rotation2: coordinates=lumbar_bending axis=(1 0 0) LinearFunction(coefficients=1 0)
          TransformAxis rotation3: coordinates=lumbar_rotation axis=(0 1 0) LinearFunction(coefficients=1 0)
    Body humerus_r: mass=2.384871 mass_center=(0 -0.187251 0) inertia_xx=0.01816195 inertia_yy=0.006265312
        inertia_zz=0.02038621 meshes=humerus_rv.vtp
      CustomJoint acromial_r: parent_body=torso location_in_parent=(0.003518283 0.4142765 0.1895747) location=(0 0 0)
        Coordinate arm_flex_r: motion_type=rotational default_value=0 range=(-3.14 3.14) clamped=true
        Coordinate arm_add_r: motion_type=rotational default_value=0 range=(-3.14 3.14) clamped=true
        Coordinate arm_rot_r: motion_type=rotational default_value=0 range=(-3.14 3.14) clamped=true
        SpatialTransform: axes_held_at_zero=(translation1 translation2 translation3)
          TransformAxis rotation1: coordinates=arm_flex_r axis=(0 0 1) LinearFunction(coefficients=1 0)
          TransformAxis rotation2: coordinates=arm_add_r axis=(1 0 0) LinearFunction(coefficients=1 0)
          TransformAxis rotation3: coordinates=arm_rot_r axis=(0 1 0) LinearFunction(coefficients=1 0)
    Body ulna_r: mass=0.7128211 mass_center=(0 -0.131521 0) inertia_xx=0.004138636 inertia_yy=0.0008634965
        inertia_zz=0.004489344 meshes=ulna_rv.vtp
      CustomJoint elbow_r: parent_body=humerus_r location_in_parent=(0.01496168 -0.3258617 -0.01092189)
          location=(0 0 0)
        Coordinate elbow_flex_r: motion_type=rotational default_value=0 range=(0 2.618) clamped=true
        SpatialTransform: axes_held_at_zero=(rotation2 rotation3 translation1 translation2 translation3)
          TransformAxis rotation1: coordinates=elbow_flex_r axis=(0.226047 0.022269 0.9738618)
              LinearFunction(coefficients=1 0)
    Body radius_r: mass=0.7128211 mass_center=(0 -0.131521 0) inertia_xx=0.004138636 inertia_yy=0.0008634965
        inertia_zz=0.004489344 meshes=radius_rv.vtp
      CustomJoint radioulnar_r: parent_body=ulna_r location_in_parent=(-0.007340749 -0.01419371 0.02846272)
          location=(0 0 0)
        Coordinate pro_sup_r: motion_type=rotational default_value=1.51 range=(1.51 2.570796) clamped=true
        SpatialTransform: axes_held_at_zero=(rotation2 rotation3 translation1 translation2 translation3)
          TransformAxis rotation1: coordinates=pro_sup_r axis=(0.05639803 0.9984065 0.001952)
              LinearFunction(coefficients=1 0)
    Body hand_r: mass=0.5368159 mass_center=(0 -0.0614558 0) inertia_xx=0.0008524983 inertia_yy=0.0005227765
        inertia_zz=0.001280659
        meshes=(pisiform_rvs.vtp lunate_rvs.vtp scaphoid_rvs.vtp triquetrum_rvs.vtp hamate_rvs.vtp capitate_rvs.vtp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)
      CustomJoint radius_hand_r: parent_body=radius_r location_in_parent=(-0.009599608 -0.2573583 0.01485173)
          location=(0 0 0)
        Coordinate wrist_flex_r: motion_type=rotational default_value=0 range=(-1.22173 1.22173) clamped=true
            locked=true
        Coordinate wrist_dev_r: motion_type=rotational default_value=0 range=(-0.4363323 0.6108652) clamped=true
            locked=true
        SpatialTransform: axes_held_at_zero=(rotation3 translation1 translation2 translation3)
          TransformAxis rotation1: coordinates=wrist_flex_r axis=(0 0 1) LinearFunction(coefficients=1 0)
          TransformAxis rotation2: coordinates=wrist_dev_r axis=(1 0 0) LinearFunction(coefficients=1 0)
    Body humerus_l: mass=2.384871 mass_center=(0 -0.187251 0) inertia_xx=0.01816195 inertia_yy=0.006265312
        inertia_zz=0.02038621 meshes=humerus_lv.vtp
      CustomJoint acromial_l: parent_body=torso location_in_parent=(0.003518283 0.4142765 -0.1895747) location=(0 0 0)
        Coordinate arm_flex_l: motion_type=rotational default_value=0 range=(-3.14 3.14) clamped=true
        Coordinate arm_add_l: motion_type=rotational default_value=0 range=(-3.14 3.14) clamped=true
        Coordinate arm_rot_l: motion_type=rotational default_value=0 range=(-3.14 3.14) clamped=true
        SpatialTransform: axes_held_at_zero=(translation1 translation2 translation3)
          TransformAxis rotation1: coordinates=arm_flex_l axis=(0 0 1) LinearFunction(coefficients=1 0)
          TransformAxis rotation2: coordinates=arm_add_l axis=(-1 0 0) LinearFunction(coefficients=1 0)
          TransformAxis rotation3: coordinates=arm_rot_l axis=(0 -1 0) LinearFunction(coefficients=1 0)
    Body ulna_l: mass=0.7128211 mass_center=(0 -0.131521 0) inertia_xx=0.004138636 inertia_yy=0.0008634965
        inertia_zz=0.004489344 meshes=ulna_lv.vtp
      CustomJoint elbow_l: parent_body=humerus_l location_in_parent=(0.01496168 -0.3258617 0.01092189) location=(0 0 0)
        Coordinate elbow_flex_l: motion_type=rotational default_value=0 range=(0 2.618) clamped=true
        SpatialTransform: axes_held_at_zero=(rotation2 rotation3 translation1 translation2 translation3)
          TransformAxis rotation1: coordinates=elbow_flex_l axis=(-0.226047 -0.022269 0.9738618)
              LinearFunction(coefficients=1 0)
    Body radius_l: mass=0.7128211 mass_center=(0 -0.131521 0) inertia_xx=0.004138636 inertia_yy=0.0008634965
        inertia_zz=0.004489344 meshes=radius_lv.vtp
      CustomJoint radioulnar_l: parent_body=ulna_l location_in_parent=(-0.007340749 -0.01419371 -0.02846272)
          location=(0 0 0)
        Coordinate pro_sup_l: motion_type=rotational default_value=1.5 range=(1.5 2.570796) clamped=true
        SpatialTransform: axes_held_at_zero=(rotation2 rotation3 translation1 translation2 translation3)
          TransformAxis rotation1: coordinates=pro_sup_l axis=(-0.05639803 -0.9984065 0.001952)
              LinearFunction(coefficients=1 0)
    Body hand_l: mass=0.5368159 mass_center=(0 -0.0614558 0) inertia_xx=0.0008524983 inertia_yy=0.0005227765
        inertia_zz=0.001280659
        meshes=(pisiform_lvs.vtp lunate_lvs.vtp scaphoid_lvs.vtp triquetrum_lvs.vtp hamate_lvs.vtp capitate_lvs.vtp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)
      CustomJoint radius_hand_l: parent_body=radius_l location_in_parent=(-0.009599608 -0.2573583 -0.01485173)
          location=(0 0 0)
        Coordinate wrist_flex_l: motion_type=rotational default_value=0 range=(-1.22173 1.22173) clamped=true
            locked=true
        Coordinate wrist_dev_l: motion_type=rotational default_value=0 range=(-0.4363323 0.6108652) clamped=true
            locked=true
        SpatialTransform: axes_held_at_zero=(rotation3 translation1 translation2 translation3)
          TransformAxis rotation1: coordinates=wrist_flex_l axis=(0 0 1) LinearFunction(coefficients=1 0)
          TransformAxis rotation2: coordinates=wrist_dev_l axis=(-1 0 0) LinearFunction(coefficients=1 0)
  ForceSet:
    HuntCrossleyForce grf_r1: transition_velocity=0.2
      ContactParametersSet contact_parameters:
        ContactParameters: geometry=(treadmill r_foot_lat_heel) stiffness=4067776 dissipation=2 static_friction=0.8
            dynamic_friction=0.8 viscous_friction=0.5
    HuntCrossleyForce grf_r2: transition_velocity=0.2
      ContactParametersSet contact_parameters:
        ContactParameters: geometry=(treadmill r_foot_lat_ball1) stiffness=1067776 dissipation=0.1 static_friction=0.8
            dynamic_friction=0.8 viscous_friction=0.5
    HuntCrossleyForce grf_r3: transition_velocity=0.2
      ContactParametersSet contact_parameters:
        ContactParameters: geometry=(treadmill r_foot_lat_ball2) stiffness=1067776 dissipation=0.1 static_friction=0.8
            dynamic_friction=0.8 viscous_friction=0.5
    HuntCrossleyForce grf_r4: transition_velocity=0.2
      ContactParametersSet contact_parameters:
        ContactParameters: geometry=(treadmill r_foot_lat_ball3) stiffness=1067776 dissipation=0.1 static_friction=0.8
            dynamic_friction=0.8 viscous_friction=0.5
    HuntCrossleyForce grf_r5: transition_velocity=0.2
      ContactParametersSet contact_parameters:
        ContactParameters: geometry=(treadmill r_toes_lat_ball1) stiffness=1067776 dissipation=0.1 static_friction=0.8
            dynamic_friction=0.8 viscous_friction=0.5
    HuntCrossleyForce grf_r6: transition_velocity=0.2
      ContactParametersSet contact_parameters:
        ContactParameters: geometry=(treadmill r_toes_lat_ball2) stiffness=1067776 dissipation=0.1 static_friction=0.8
            dynamic_friction=0.8 viscous_friction=0.5
    HuntCrossleyForce grf_r7: transition_velocity=0.2
      ContactParametersSet contact_parameters:
        ContactParameters: geometry=(treadmill r_toes_lat_ball3) stiffness=1067776 dissipation=0.1 static_friction=0.8
            dynamic_friction=0.8 viscous_friction=0.5
    HuntCrossleyForce grf_l1: transition_velocity=0.2
      ContactParametersSet contact_parameters:
        ContactParameters: geometry=(treadmill l_foot_lat_heel) stiffness=4067776 dissipation=2 static_friction=0.8
            dynamic_friction=0.8 viscous_friction=0.5
    HuntCrossleyForce grf_l2: transition_velocity=0.2
      ContactParametersSet contact_parameters:
        ContactParameters: geometry=(treadmill l_foot_lat_ball1) stiffness=1067776 dissipation=0.1 static_friction=0.8
            dynamic_friction=0.8 viscous_friction=0.5
    HuntCrossleyForce grf_l3: transition_velocity=0.2
      ContactParametersSet contact_parameters:
        ContactParameters: geometry=(treadmill l_foot_lat_ball2) stiffness=1067776 dissipation=0.1 static_friction=0.8
            dynamic_friction=0.8 viscous_friction=0.5
    HuntCrossleyForce grf_l4: transition_velocity=0.2
      ContactParametersSet contact_parameters:
        ContactParameters: geometry=(treadmill l_foot_lat_ball3) stiffness=1067776 dissipation=0.1 static_friction=0.8
            dynamic_friction=0.8 viscous_friction=0.5
    HuntCrossleyForce grf_l5: transition_velocity=0.2
      ContactParametersSet contact_parameters:
        ContactParameters: geometry=(treadmill l_toes_lat_ball1) stiffness=1067776 dissipation=0.1 static_friction=0.8
            dynamic_friction=0.8 viscous_friction=0.5
    HuntCrossleyForce grf_l6: transition_velocity=0.2
      ContactParametersSet contact_parameters:
        ContactParameters: geometry=(treadmill l_toes_lat_ball2) stiffness=1067776 dissipation=0.1 static_friction=0.8
            dynamic_friction=0.8 viscous_friction=0.5
    HuntCrossleyForce grf_l7: transition_velocity=0.2
      ContactParametersSet contact_parameters:
        ContactParameters: geometry=(treadmill l_toes_lat_ball3) stiffness=1067776 dissipation=0.1 static_friction=0.8
            dynamic_friction=0.8 viscous_friction=0.5
  MarkerSet:
    Marker RASI: pelvis (0.00923329 0.0230832 0.120951)
    Marker LASI: pelvis (0.00923329 0.0230832 -0.120951)
    Marker CLAV: torso (0.0223029 0.434907 0)
    Marker RSHO: torso (-0.02273 0.444017 0.215258)
    Marker LSHO: torso (-0.02273 0.444017 -0.215258)
    Marker RKNE: femur_r (0 -0.425194 0.0564761)
    Marker RKNEmed: femur_r (0 -0.425194 -0.0521688)
    Marker RTHI: femur_r (0.0740562 -0.190084 0.112463)
    Marker RTHI2: femur_r (0.0189975 -0.202946 0.120801)
    Marker RTHI3: femur_r (0.046982 -0.235083 0.111213)
    Marker RANK: tibia_r (0 -0.431991 0.0565702)
    Marker RANKmed: tibia_r (0 -0.411419 -0.0378547)
    Marker RTIB: tibia_r (0.00551852 -0.223351 0.0881495)
    Marker RTIB2: tibia_r (-0.0477866 -0.22468 0.0916747)
    Marker RTIB3: tibia_r (-0.0199133 -0.27219 0.0878276)
    Marker RTOE: calcn_r (0.16245 0.0225625 0)
    Marker RHEE: calcn_r (-0.0135375 0.030685 0)
    Marker RLatFoot: calcn_r (0.12096 -0.0325805 0.0731457)
    Marker LKNE: femur_l (0 -0.425194 -0.0565396)
    Marker LKNEmed: femur_l (0 -0.425194 0.0565396)
    Marker LTHI: femur_l (0.079432 -0.198908 -0.114902)
    Marker LTHI2: femur_l (0.00612773 -0.189434 -0.131379)
    Marker LTHI3: femur_l (0.0371305 -0.240224 -0.118285)
    Marker LANK: tibia_l (0 -0.431991 -0.0565702)
    Marker LANKmed: tibia_l (0 -0.411419 0.0378547)
    Marker LTIB: tibia_l (0.0162004 -0.214891 -0.0890551)
    Marker LTIB2: tibia_l (-0.0401594 -0.223347 -0.101137)
    Marker LTIB3: tibia_l (-0.00378 -0.266633 -0.0915367)
    Marker LTOE: calcn_l (0.16245 0.0225625 0)
    Marker LHEE: calcn_l (-0.0135375 0.030685 0)
    Marker LLatFoot: calcn_l (0.110681 -0.0376474 -0.0661118)
    Marker RELB: humerus_r (0.00829814 -0.320178 0.0455315)
    Marker LELB: humerus_l (0.00829814 -0.320178 -0.0455315)
    Marker RWRA: radius_r (-0.0109124 -0.250985 0.0491056)
    Marker RWRB: ulna_r (-0.0436494 -0.26517 0.0327371)
    Marker LWRA: radius_l (-0.0109124 -0.250985 -0.0491056)
    Marker LWRB: ulna_l (-0.0436494 -0.264079 -0.0218248)
    Marker RPSI: pelvis (-0.132959 0.0461665 0.0461665)
    Marker LPSI: pelvis (-0.132959 0.0461665 -0.0461665)
    Marker C7: torso (-0.0766443 0.488759 0)
    Marker LFHD: torso (0.0761687 0.747109 -0.0436217)
    Marker RFHD: torso (0.0134448 0.702733 0.0732038)
    Marker LBHD: torso (0.0239011 0.698829 -0.106282)
    Marker LFIN: hand_l (-0.0115259 -0.063175 0)
    Marker RFIN: hand_r (-0.0121561 -0.0594657 0.000712975)
    Marker LUA1: humerus_l (0.036153 -0.228678 -0.0359232)
    Marker LLA1: radius_l (-0.036292 -0.12106 -0.0257328)
    Marker RUA1: humerus_r (0.0121733 -0.209773 0.0542167)
    Marker RLA1: radius_r (-0.0482557 -0.1085 0.0117274)
  ContactGeometrySet ModelContactGeometries:
    ContactHalfSpace treadmill: body_name=treadmill location=(0 0.03 0) orientation=(0 0 -1.5708)
    ContactSphere r_foot_lat_heel: body_name=calcn_r location=(0.03 0.01 0) radius=0.035
    ContactSphere r_foot_lat_ball1: body_name=calcn_r location=(0.175 -0.015 -0.025) radius=0.02
    ContactSphere r_foot_lat_ball2: body_name=calcn_r location=(0.17 -0.015 0.005) radius=0.015
    ContactSphere r_foot_lat_ball3: body_name=calcn_r location=(0.155 -0.014 0.04) radius=0.015
    ContactSphere r_toes_lat_ball1: body_name=toes_r location=(0.053 -0.02 -0.025) radius=0.015
    ContactSphere r_toes_lat_ball2: body_name=toes_r location=(0.04 -0.015 0.01) radius=0.015
    ContactSphere r_toes_lat_ball3: body_name=toes_r location=(0.015 -0.015 0.04) radius=0.015
    ContactSphere l_foot_lat_heel: body_name=calcn_l location=(0.03 0.01 0) radius=0.035
    ContactSphere l_foot_lat_ball1: body_name=calcn_l location=(0.175 -0.015 0.025) radius=0.02
    ContactSphere l_foot_lat_ball2: body_name=calcn_l location=(0.17 -0.015 -0.005) radius=0.015
    ContactSphere l_foot_lat_ball3: body_name=calcn_l location=(0.155 -0.014 -0.04) radius=0.015
    ContactSphere l_toes_lat_ball1: body_name=toes_l location=(0.053 -0.02 0.025) radius=0.015
    ContactSphere l_toes_lat_ball2: body_name=toes_l location=(0.04 -0.015 -0.01) radius=0.015
    ContactSphere l_toes_lat_ball3: body_name=toes_l location=(0.015 -0.015 -0.04) radius=0.015
