# OpenSim document version 30000
Model 3DGaitModel2392-scaled:
  length_units: meters
  force_units: N
  gravity: 0 -9.80665 0
  credits:
    Delp S.L., Loan J.P., Hoy M.G., Zajac F.E., Topp E.L., Rosen J.M., Thelen D.G., Anderson F.C., Seth A.
  publications:
    Notes: 3D, 23 DOF gait model created by D.G. Thelen, Univ. of Wisconsin-Madison, and Ajay Seth, Frank C. Anderson, and Scott L. Delp, Stanford University. Lower extremity joint defintions based on Delp et al. (1990). Low back joint and anthropometry based on Anderson and Pandy (1999, 2001). Planar knee model of Yamaguchi and Zajac (1989). Seth removed the patella to avoid kinematic constraints; insertions of the quadrucepts are handled with moving points in the tibia frame. Delp, S.L., Loan, J.P., Hoy, M.G., Zajac, F.E., Topp E.L., Rosen, J.M.: An interactive graphics-based model of the lower extremity to study orthopaedic surgical procedures, IEEE Transactions on Biomedical Engineering, vol. 37, pp. 757-767, 1990. Yamaguchi G.T., Zajac F.E.: A planar model of the knee joint to characterize the knee extensor mechanism." J . Biomecl7. vol. 21. pp. 1-10. 1989. Anderson F.C., Pandy M.G.: A dynamic optimization solution for vertical jumping in three dimensions. Computer Methods in Biomechanics and Biomedical Engineering 2:201-231, 1999. Anderson F.C., Pandy M.G.: Dynamic optimization of human walking. Journal of Biomechanical Engineering 123:381-390, 2001.
  BodySet:
    Body ground: mass=0 mass_center=(0 0 0) inertia_xx=0 inertia_yy=0 inertia_zz=0 meshes=treadmill.vtp
    Body pelvis: mass=13.81876 mass_center=(-0.0652793 0 0) inertia_xx=0.1028348 inertia_yy=0.08712951
        inertia_zz=0.05791962 meshes=(sacrum.vtp pelvis.vtp l_pelvis.vtp)
      CustomJoint ground_pelvis: parent_body=ground location_in_parent=(0 0 0) location=(0 0 0)
        Coordinate pelvis_tilt: motion_type=rotational default_value=0 range=(-1.570796 1.570796) clamped=true
        Coordinate pelvis_list: motion_type=rotational default_value=0 range=(-1.570796 1.570796) clamped=true
        Coordinate pelvis_rotation: motion_type=rotational default_value=0 range=(-3.1416 3.1416) clamped=true
        Coordinate pelvis_tx: motion_type=translational default_value=0 range=(-5 5) clamped=true
        Coordinate pelvis_ty: motion_type=translational default_value=0.93 range=(-1 2) clamped=true
        Coordinate pelvis_tz: motion_type=translational default_value=0 range=(-3 3) clamped=true
        SpatialTransform:
          TransformAxis rotation1: coordinates=pelvis_tilt axis=(0 0 1) LinearFunction(coefficients=1 0)
          TransformAxis rotation2: coordinates=pelvis_list axis=(1 0 0) LinearFunction(coefficients=1 0)
          TransformAxis rotation3: coordinates=pelvis_rotation axis=(0 1 0) LinearFunction(coefficients=1 0)
          TransformAxis translation1: coordinates=pelvis_tx axis=(1 0 0) LinearFunction(coefficients=1 0)
          TransformAxis translation2: coordinates=pelvis_ty axis=(0 1 0) LinearFunction(coefficients=1 0)
          TransformAxis translation3: coordinates=pelvis_tz axis=(0 0 1) LinearFunction(coefficients=1 0)
    Body femur_r: mass=10.91397 mass_center=(0 -0.174176 0) inertia_xx=0.1649279 inertia_yy=0.04323353
        inertia_zz=0.1739195 meshes=femur_r.vtp
      CustomJoint hip_r: parent_body=pelvis location_in_parent=(-0.06527935 -0.06103204 0.07709796) location=(0 0 0)
        Coordinate hip_flexion_r: motion_type=rotational default_value=0 range=(-2.094395 2.094395) clamped=true
        Coordinate hip_adduction_r: motion_type=rotational default_value=0 range=(-2.094395 2.094395) clamped=true
        Coordinate hip_rotation_r: motion_type=rotational default_value=0 range=(-2.094395 2.094395) clamped=true
        SpatialTransform: axes_held_at_zero=(translation1 translation2 translation3)
          TransformAxis rotation1: coordinates=hip_flexion_r axis=(0 0 1) LinearFunction(coefficients=1 0)
          TransformAxis rotation2: coordinates=hip_adduction_r axis=(1 0 0) LinearFunction(coefficients=1 0)
          TransformAxis rotation3: coordinates=hip_rotation_r axis=(0 1 0) LinearFunction(coefficients=1 0)
    Body tibia_r: mass=4.350262 mass_center=(0 -0.19203 0) inertia_xx=0.06256271 inertia_yy=0.00633075
        inertia_zz=0.06343163 meshes=(tibia_r.vtp fibula_r.vtp)
      CustomJoint knee_r: parent_body=femur_r location_in_parent=(0 0 0) location=(0 0 0)
        Coordinate knee_angle_r: motion_type=rotational default_value=0 range=(-2.094395 0.1745329) clamped=true
        SpatialTransform: axes_held_at_zero=(rotation2 rotation3 translation3)
          TransformAxis rotation1: coordinates=knee_angle_r axis=(0 0 1) LinearFunction(coefficients=1 0)
          TransformAxis translation1: coordinates=knee_angle_r axis=(1 0 0)
            MultiplierFunction: scale=1.024565
              SimmSpline: x=(-2.0944 -1.74533 -1.39626 -1.0472 -0.698132 -0.349066 -0.174533 0.197344 0.337395 0.490178 1.52146 2.0944)
                  y=(-0.0032 0.00179 0.00411 0.0041 0.00212 -0.001 -0.0031 -0.005227 -0.005435 -0.005574 -0.005435 -0.00525)
          TransformAxis translation2: coordinates=knee_angle_r axis=(0 1 0)
            MultiplierFunction: scale=1.024565
              SimmSpline: x=(-2.0944 -1.22173 -0.523599 -0.349066 -0.174533 0.159149 2.0944)
                  y=(-0.4226 -0.4082 -0.399 -0.3976 -0.3966 -0.395264 -0.396)
    Body talus_r: mass=0.1173368 mass_center=(0 0 0) inertia_xx=0.0009557156 inertia_yy=0.0009557156
        inertia_zz=0.0009557156 meshes=talus.vtp
      CustomJoint ankle_r: parent_body=tibia_r location_in_parent=(0 -0.4422764 0) location=(0 0 0)
        Coordinate ankle_angle_r: motion_type=rotational default_value=0 range=(-1.570796 1.570796) clamped=true
        SpatialTransform: axes_held_at_zero=(rotation2 rotation3 translation1 translation2 translation3)
          TransformAxis rotation1: coordinates=ankle_angle_r axis=(-0.1050135 -0.1740224 0.9791263)
              LinearFunction(coefficients=1 0)
    Body calcn_r: mass=1.46671 mass_center=(0.09025 0.027075 0) inertia_xx=0.001338002 inertia_yy=0.003727291
        inertia_zz=0.003918434 meshes=foot.vtp
      CustomJoint subtalar_r: parent_body=talus_r location_in_parent=(-0.04401493 -0.03785988 0.0071478)
          location=(0 0 0)
        Coordinate subtalar_angle_r: motion_type=rotational default_value=0 range=(-1.570796 1.570796) clamped=true
            locked=true
        SpatialTransform: axes_held_at_zero=(rotation2 rotation3 translation1 translation2 translation3)
          TransformAxis rotation1: coordinates=subtalar_angle_r axis=(0.7871796 0.6047475 -0.1209495)
              LinearFunction(coefficients=1 0)
    Body toes_r: mass=0.2541515 mass_center=(0.0312265 0.005415 -0.0157937) inertia_xx=9.557156e-5
        inertia_yy=0.0001911431 inertia_zz=0.0009557156 meshes=bofoot.vtp
      CustomJoint mtp_r: parent_body=calcn_r location_in_parent=(0.161367 -0.001805 0.0009747) location=(0 0 0)
        Coordinate mtp_angle_r: motion_type=rotational default_value=0 range=(-1.570796 1.570796) clamped=true
            locked=true
        SpatialTransform: axes_held_at_zero=(rotation2 rotation3 translation1 translation2 translation3)
          TransformAxis rotation1: coordinates=mtp_angle_r axis=(-0.5809544 0 0.8139361)
              LinearFunction(coefficients=1 0)
    Body femur_l: mass=10.91397 mass_center=(0 -0.174176 0) inertia_xx=0.1649279 inertia_yy=0.04323353
        inertia_zz=0.1739195 meshes=l_femur.vtp
      CustomJoint hip_l: parent_body=pelvis location_in_parent=(-0.06527935 -0.06103204 -0.07709796) location=(0 0 0)
        Coordinate hip_flexion_l: motion_type=rotational default_value=0 range=(-2.094395 2.094395) clamped=true
        Coordinate hip_adduction_l: motion_type=rotational default_value=0 range=(-2.094395 2.094395) clamped=true
        Coordinate hip_rotation_l: motion_type=rotational default_value=0 range=(-2.094395 2.094395) clamped=true
        SpatialTransform: axes_held_at_zero=(translation1 translation2 translation3)
          TransformAxis rotation1: coordinates=hip_flexion_l axis=(0 0 1) LinearFunction(coefficients=1 0)
          TransformAxis rotation2: coordinates=hip_adduction_l axis=(-1 0 0) LinearFunction(coefficients=1 0)
          TransformAxis rotation3: coordinates=hip_rotation_l axis=(0 -1 0) LinearFunction(coefficients=1 0)
    Body tibia_l: mass=4.350262 mass_center=(0 -0.19203 0) inertia_xx=0.06256271 inertia_yy=0.00633075
        inertia_zz=0.06343163 meshes=(l_tibia.vtp l_fibula.vtp)
      CustomJoint knee_l: parent_body=femur_l location_in_parent=(0 0 0) location=(0 0 0)
        Coordinate knee_angle_l: motion_type=rotational default_value=0 range=(-2.094395 0.1745329) clamped=true
        SpatialTransform: axes_held_at_zero=(rotation2 rotation3 translation3)
          TransformAxis rotation1: coordinates=knee_angle_l axis=(0 0 1) LinearFunction(coefficients=1 0)
          TransformAxis translation1: coordinates=knee_angle_l axis=(1 0 0)
            MultiplierFunction: scale=1.024565
              SimmSpline: x=(-2.0944 -1.74533 -1.39626 -1.0472 -0.698132 -0.349066 -0.174533 0.197344 0.337395 0.490178 1.52146 2.0944)
                  y=(-0.0032 0.00179 0.00411 0.0041 0.00212 -0.001 -0.0031 -0.005227 -0.005435 -0.005574 -0.005435 -0.00525)
          TransformAxis translation2: coordinates=knee_angle_l axis=(0 1 0)
            MultiplierFunction: scale=1.024565
              SimmSpline: x=(-2.0944 -1.22173 -0.523599 -0.349066 -0.174533 0.159149 2.0944)
                  y=(-0.4226 -0.4082 -0.399 -0.3976 -0.3966 -0.395264 -0.396)
    Body talus_l: mass=0.1173368 mass_center=(0 0 0) inertia_xx=0.0009557156 inertia_yy=0.0009557156
        inertia_zz=0.0009557156 meshes=l_talus.vtp
      CustomJoint ankle_l: parent_body=tibia_l location_in_parent=(0 -0.4422764 0) location=(0 0 0)
        Coordinate ankle_angle_l: motion_type=rotational default_value=0 range=(-1.047198 1.047198) clamped=true
        SpatialTransform: axes_held_at_zero=(rotation2 rotation3 translation1 translation2 translation3)
          TransformAxis rotation1: coordinates=ankle_angle_l axis=(0.1050135 0.1740224 0.9791263)
              LinearFunction(coefficients=1 0)
    Body calcn_l: mass=1.46671 mass_center=(0.09025 0.027075 0) inertia_xx=0.001338002 inertia_yy=0.003727291
        inertia_zz=0.003918434 meshes=l_foot.vtp
      CustomJoint subtalar_l: parent_body=talus_l location_in_parent=(-0.04401493 -0.03785988 -0.0071478)
          location=(0 0 0)
        Coordinate subtalar_angle_l: motion_type=rotational default_value=0 range=(-1.570796 1.570796) clamped=true
            locked=true
        SpatialTransform: axes_held_at_zero=(rotation2 rotation3 translation1 translation2 translation3)
          TransformAxis rotation1: coordinates=subtalar_angle_l axis=(-0.7871796 -0.6047475 -0.1209495)
              LinearFunction(coefficients=1 0)
    Body toes_l: mass=0.2541515 mass_center=(0.0312265 0.005415 0.0157937) inertia_xx=9.557156e-5
        inertia_yy=0.0001911431 inertia_zz=0.0009557156 meshes=l_bofoot.vtp
      CustomJoint mtp_l: parent_body=calcn_l location_in_parent=(0.161367 -0.001805 -0.0009747) location=(0 0 0)
        Coordinate mtp_angle_l: motion_type=rotational default_value=0 range=(-1.047198 1.047198) clamped=true
            locked=true
        SpatialTransform: axes_held_at_zero=(rotation2 rotation3 translation1 translation2 translation3)
          TransformAxis rotation1: coordinates=mtp_angle_l axis=(0.5809544 0 0.8139361)
              LinearFunction(coefficients=1 0)
    Body torso: mass=40.17213 mass_center=(-0.0334544 0.356847 0) inertia_xx=2.151503 inertia_yy=1.102381
        inertia_zz=2.088614 meshes=(hat_spine.vtp hat_jaw.vtp hat_skull.vtp hat_ribs.vtp)
      CustomJoint back: parent_body=pelvis location_in_parent=(-0.09297922 0.0752513 0) location=(0 0 0)
        Coordinate lumbar_extension: motion_type=rotational default_value=0 range=(-1.570796 1.570796) clamped=true
        Coordinate lumbar_bending: motion_type=rotational default_value=0 range=(-1.570796 1.570796) clamped=true
        Coordinate lumbar_rotation: motion_type=rotational default_value=0 range=(-1.570796 1.570796) clamped=true
        SpatialTransform: axes_held_at_zero=(translation1 translation2 translation3)
          TransformAxis rotation1: coordinates=lumbar_extension axis=(0 0 1) LinearFunction(coefficients=1 0)
          TransformAxis rotation2: coordinates=lumbar_bending axis=(1 0 0) LinearFunction(coefficients=1 0)
          TransformAxis rotation3: coordinates=lumbar_rotation axis=(0 1 0) LinearFunction(coefficients=1 0)
    Body humerus_r: mass=2.384871 mass_center=(0 -0.187251 0) inertia_xx=0.01816195 inertia_yy=0.006265312
        inertia_zz=0.02038621 meshes=humerus_rv.vtp
      CustomJoint acromial_r: parent_body=torso location_in_parent=(0.003518283 0.4142765 0.1895747) location=(0 0 0)
        Coordinate arm_flex_r: motion_type=rotational default_value=0 range=(-3.14 3.14) clamped=true
        Coordinate arm_add_r: motion_type=rotational default_value=0 range=(-3.14 3.14) clamped=true
        Coordinate arm_rot_r: motion_type=rotational default_value=0 range=(-3.14 3.14) clamped=true
        SpatialTransform: axes_held_at_zero=(translation1 translation2 translation3)
          TransformAxis rotation1: coordinates=arm_flex_r axis=(0 0 1) LinearFunction(coefficients=1 0)
          TransformAxis rotation2: coordinates=arm_add_r axis=(1 0 0) LinearFunction(coefficients=1 0)
          TransformAxis rotation3: coordinates=arm_rot_r axis=(0 1 0) LinearFunction(coefficients=1 0)
    Body ulna_r: mass=0.7128211 mass_center=(0 -0.131521 0) inertia_xx=0.004138636 inertia_yy=0.0008634965
        inertia_zz=0.004489344 meshes=ulna_rv.vtp
      CustomJoint elbow_r: parent_body=humerus_r location_in_parent=(0.01496168 -0.3258617 -0.01092189)
          location=(0 0 0)
        Coordinate elbow_flex_r: motion_type=rotational default_value=0 range=(0 2.618) clamped=true
        SpatialTransform: axes_held_at_zero=(rotation2 rotation3 translation1 translation2 translation3)
          TransformAxis rotation1: coordinates=elbow_flex_r axis=(0.226047 0.022269 0.9738618)
              LinearFunction(coefficients=1 0)
    Body radius_r: mass=0.7128211 mass_center=(0 -0.131521 0) inertia_xx=0.004138636 inertia_yy=0.0008634965
        inertia_zz=0.004489344 meshes=radius_rv.vtp
      CustomJoint radioulnar_r: parent_body=ulna_r location_in_parent=(-0.007340749 -0.01419371 0.02846272)
          location=(0 0 0)
        Coordinate pro_sup_r: motion_type=rotational default_value=1.51 range=(1.51 2.570796) clamped=true
        SpatialTransform: axes_held_at_zero=(rotation2 rotation3 translation1 translation2 translation3)
          TransformAxis rotation1: coordinates=pro_sup_r axis=(0.05639803 0.9984065 0.001952)
              LinearFunction(coefficients=1 0)
    Body hand_r: mass=0.5368159 mass_center=(0 -0.0614558 0) inertia_xx=0.0008524983 inertia_yy=0.0005227765
        inertia_zz=0.001280659
        meshes=(pisiform_rvs.vtp lunate_rvs.vtp scaphoid_rvs.vtp triquetrum_rvs.vtp hamate_rvs.vtp capitate_rvs.vtp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)
      CustomJoint radius_hand_r: parent_body=radius_r location_in_parent=(-0.009599608 -0.2573583 0.01485173)
          location=(0 0 0)
        Coordinate wrist_flex_r: motion_type=rotational default_value=0 range=(-1.22173 1.22173) clamped=true
            locked=true
        Coordinate wrist_dev_r: motion_type=rotational default_value=0 range=(-0.4363323 0.6108652) clamped=true
            locked=true
        SpatialTransform: axes_held_at_zero=(rotation3 translation1 translation2 translation3)
          TransformAxis rotation1: coordinates=wrist_flex_r axis=(0 0 1) LinearFunction(coefficients=1 0)
          TransformAxis rotation2: coordinates=wrist_dev_r axis=(1 0 0) LinearFunction(coefficients=1 0)
    Body humerus_l: mass=2.384871 mass_center=(0 -0.187251 0) inertia_xx=0.01816195 inertia_yy=0.006265312
        inertia_zz=0.02038621 meshes=humerus_lv.vtp
      CustomJoint acromial_l: parent_body=torso location_in_parent=(0.003518283 0.4142765 -0.1895747) location=(0 0 0)
        Coordinate arm_flex_l: motion_type=rotational default_value=0 range=(-3.14 3.14) clamped=true
        Coordinate arm_add_l: motion_type=rotational default_value=0 range=(-3.14 3.14) clamped=true
        Coordinate arm_rot_l: motion_type=rotational default_value=0 range=(-3.14 3.14) clamped=true
        SpatialTransform: axes_held_at_zero=(translation1 translation2 translation3)
          TransformAxis rotation1: coordinates=arm_flex_l axis=(0 0 1) LinearFunction(coefficients=1 0)
          TransformAxis rotation2: coordinates=arm_add_l axis=(-1 0 0) LinearFunction(coefficients=1 0)
          TransformAxis rotation3: coordinates=arm_rot_l axis=(0 -1 0) LinearFunction(coefficients=1 0)
    Body ulna_l: mass=0.7128211 mass_center=(0 -0.131521 0) inertia_xx=0.004138636 inertia_yy=0.0008634965
        inertia_zz=0.004489344 meshes=ulna_lv.vtp
      CustomJoint elbow_l: parent_body=humerus_l location_in_parent=(0.01496168 -0.3258617 0.01092189) location=(0 0 0)
        Coordinate elbow_flex_l: motion_type=rotational default_value=0 range=(0 2.618) clamped=true
        SpatialTransform: axes_held_at_zero=(rotation2 rotation3 translation1 translation2 translation3)
          TransformAxis rotation1: coordinates=elbow_flex_l axis=(-0.226047 -0.022269 0.9738618)
              LinearFunction(coefficients=1 0)
    Body radius_l: mass=0.7128211 mass_center=(0 -0.131521 0) inertia_xx=0.004138636 inertia_yy=0.0008634965
        inertia_zz=0.004489344 meshes=radius_lv.vtp
      CustomJoint radioulnar_l: parent_body=ulna_l location_in_parent=(-0.007340749 -0.01419371 -0.02846272)
          location=(0 0 0)
        Coordinate pro_sup_l: motion_type=rotational default_value=1.5 range=(1.5 2.570796) clamped=true
        SpatialTransform: axes_held_at_zero=(rotation2 rotation3 translation1 translation2 translation3)
          TransformAxis rotation1: coordinates=pro_sup_l axis=(-0.05639803 -0.9984065 0.001952)
              LinearFunction(coefficients=1 0)
    Body hand_l: mass=0.5368159 mass_center=(0 -0.0614558 0) inertia_xx=0.0008524983 inertia_yy=0.0005227765
        inertia_zz=0.001280659
        meshes=(pisiform_lvs.vtp lunate_lvs.vtp scaphoid_lvs.vtp triquetrum_lvs.vtp hamate_lvs.vtp capitate_lvs.vtp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)
      CustomJoint radius_hand_l: parent_body=radius_l location_in_parent=(-0.009599608 -0.2573583 -0.01485173)
          location=(0 0 0)
        Coordinate wrist_flex_l: motion_type=rotational default_value=0 range=(-1.22173 1.22173) clamped=true
            locked=true
        Coordinate wrist_dev_l: motion_type=rotational default_value=0 range=(-0.4363323 0.6108652) clamped=true
            locked=true
        SpatialTransform: axes_held_at_zero=(rotation3 translation1 translation2 translation3)
          TransformAxis rotation1: coordinates=wrist_flex_l axis=(0 0 1) LinearFunction(coefficients=1 0)
          TransformAxis rotation2: coordinates=wrist_dev_l axis=(-1 0 0) LinearFunction(coefficients=1 0)
  ForceSet:
    Thelen2003Muscle [values shared by the 92 below unless stated]: min_control=0 max_control=1 optimal_force=1
        max_contraction_velocity=10 activation_time_constant=0.01 deactivation_time_constant=0.04
        FmaxTendonStrain=0.033 FmaxMuscleStrain=0.6 KshapeActive=0.5 KshapePassive=4 Af=0.3 Flen=1.8
    Thelen2003Muscle glut_med1_r: max_isometric_force=819 optimal_fiber_length=0.05070646
        tendon_slack_length=0.07392718 pennation_angle_at_optimal=0.1396263 [radians]
      PathPoint P1: pelvis (-0.0376718 0.0280692 0.11163)
      PathPoint P2: femur_r (-0.0223355 -0.0119874 0.0568634)
    Thelen2003Muscle glut_med2_r: max_isometric_force=573 optimal_fiber_length=0.08012407
        tendon_slack_length=0.05025534 pennation_angle_at_optimal=0
      PathPoint P1: pelvis (-0.0789447 0.0410882 0.070727)
      PathPoint P2: femur_r (-0.0264338 -0.00594248 0.0539946)
    Thelen2003Muscle glut_med3_r: max_isometric_force=653 optimal_fiber_length=0.06157381
        tendon_slack_length=0.05051721 pennation_angle_at_optimal=0.3316126
      PathPoint P1: pelvis (-0.112923 0.00969495 0.0598317)
      PathPoint P2: femur_r (-0.0316591 -0.00481546 0.0530725)
    Thelen2003Muscle glut_min1_r: max_isometric_force=270 optimal_fiber_length=0.06576257
        tendon_slack_length=0.01547355 pennation_angle_at_optimal=0.1745329
      PathPoint P1: pelvis (-0.0431195 -0.00738663 0.0975035)
      PathPoint P2: femur_r (-0.00737687 -0.0106554 0.0573757)
    Thelen2003Muscle glut_min2_r: max_isometric_force=285 optimal_fiber_length=0.05440885
        tendon_slack_length=0.02526125 pennation_angle_at_optimal=0
      PathPoint P1: pelvis (-0.0584467 -0.00600164 0.0915019)
      PathPoint P2: femur_r (-0.00983583 -0.0106554 0.0573757)
    Thelen2003Muscle glut_min3_r: max_isometric_force=323 optimal_fiber_length=0.03693384 tendon_slack_length=0.0495691
        pennation_angle_at_optimal=0.01745329
      PathPoint P1: pelvis (-0.0770056 -0.00581697 0.079037)
      PathPoint P2: femur_r (-0.0138316 -0.00850389 0.0563511)
    Thelen2003Muscle semimem_r: max_isometric_force=1288 optimal_fiber_length=0.08260458 tendon_slack_length=0.370688
        pennation_angle_at_optimal=0.2617994
      PathPoint P1: pelvis (-0.110061 -0.0899969 0.0660272)
      ConditionalPathPoint P2: tibia_r (-0.0357935 -0.0361947 -0.0194499) range=(-0.558505 0.174533)
          coordinate=knee_angle_r
      PathPoint P3: tibia_r (-0.0277708 -0.0490721 -0.0201287)
    Thelen2003Muscle semiten_r: max_isometric_force=410 optimal_fiber_length=0.2080135 tendon_slack_length=0.2644151
        pennation_angle_at_optimal=0.08726646
      PathPoint P1: pelvis (-0.116662 -0.101455 0.0557598)
      ConditionalPathPoint P2: tibia_r (-0.0432299 -0.0294063 -0.0234201) range=(-0.331613 0.174533)
          coordinate=knee_angle_r
      PathPoint P3: tibia_r (-0.0341684 -0.054328 -0.0235332)
      PathPoint P4: tibia_r (-0.0116226 -0.0767298 -0.0251995)
      PathPoint P5: tibia_r (0.00277708 -0.0983294 -0.0198511)
    Thelen2003Muscle bifemlh_r: max_isometric_force=896 optimal_fiber_length=0.1125859 tendon_slack_length=0.3367249
        pennation_angle_at_optimal=0
      PathPoint P1: pelvis (-0.116302 -0.0947059 0.0641159)
      PathPoint P2: tibia_r (-0.0309594 -0.0370278 0.0302702)
      PathPoint P3: tibia_r (-0.024068 -0.0579074 0.0352793)
    Thelen2003Muscle bifemsh_r: max_isometric_force=804 optimal_fiber_length=0.1774274 tendon_slack_length=0.0912777
        pennation_angle_at_optimal=0.4014257
      PathPoint P1: femur_r (0.00512282 -0.216286 0.0239748)
      PathPoint P2: tibia_r (-0.0309594 -0.0370278 0.0302702)
      PathPoint P3: tibia_r (-0.024068 -0.0579074 0.0352793)
    Thelen2003Muscle sar_r: max_isometric_force=156 optimal_fiber_length=0.525916 tendon_slack_length=0.1011377
        pennation_angle_at_optimal=0
      PathPoint P1: pelvis (-0.0141269 -0.00120033 0.114677)
      PathPoint P2: femur_r (-0.00307369 -0.365564 -0.0431342)
      PathPoint P3: tibia_r (-0.00575988 -0.0430962 -0.0410392)
      PathPoint P4: tibia_r (0.0061713 -0.0605816 -0.0393934)
      PathPoint P5: tibia_r (0.0249938 -0.0863982 -0.0259194)
    Thelen2003Muscle add_long_r: max_isometric_force=627 optimal_fiber_length=0.140301 tendon_slack_length=0.1118342
        pennation_angle_at_optimal=0.1047198
      PathPoint P1: pelvis (-0.0291772 -0.0771902 0.0156042)
      PathPoint P2: femur_r (0.00512282 -0.216286 0.0239748)
    Thelen2003Muscle add_brev_r: max_isometric_force=429 optimal_fiber_length=0.1333275 tendon_slack_length=0.02004925
        pennation_angle_at_optimal=0
      PathPoint P1: pelvis (-0.0541994 -0.0844846 0.0151426)
      PathPoint P2: femur_r (0.000922108 -0.122538 0.0301222)
    Thelen2003Muscle add_mag1_r: max_isometric_force=381 optimal_fiber_length=0.08817469 tendon_slack_length=0.06081013
        pennation_angle_at_optimal=0.08726646
      PathPoint P1: pelvis (-0.0675876 -0.108399 0.0235448)
      PathPoint P2: femur_r (-0.00461055 -0.124075 0.0347328)
    Thelen2003Muscle add_mag2_r: max_isometric_force=343 optimal_fiber_length=0.1257598 tendon_slack_length=0.1247205
        pennation_angle_at_optimal=0.05235988
      PathPoint P1: pelvis (-0.0767286 -0.110061 0.0284386)
      PathPoint P2: femur_r (0.00553266 -0.234113 0.0232577)
    Thelen2003Muscle add_mag3_r: max_isometric_force=488 optimal_fiber_length=0.135844 tendon_slack_length=0.2582073
        pennation_angle_at_optimal=0.08726646
      PathPoint P1: pelvis (-0.102563 -0.105379 0.0450769)
      PathPoint P2: femur_r (0.00717195 -0.393126 -0.0272534)
    Thelen2003Muscle tfl_r: max_isometric_force=233 optimal_fiber_length=0.09585732 tendon_slack_length=0.4288354
        pennation_angle_at_optimal=0.05235988
      PathPoint P1: pelvis (-0.0287156 0.0197592 0.114585)
      PathPoint P2: femur_r (0.0301222 -0.101944 0.0611665)
      PathPoint P3: femur_r (0.00553266 -0.414847 0.036577)
      PathPoint P4: tibia_r (0.0061713 -0.0500904 0.0305479)
    Thelen2003Muscle pect_r: max_isometric_force=266 optimal_fiber_length=0.09991782 tendon_slack_length=0.03297288
        pennation_angle_at_optimal=0
      PathPoint P1: pelvis (-0.0397955 -0.0709116 0.0416422)
      PathPoint P2: femur_r (-0.0124996 -0.0842193 0.0259215)
    Thelen2003Muscle grac_r: max_isometric_force=162 optimal_fiber_length=0.3650353 tendon_slack_length=0.1306661
        pennation_angle_at_optimal=0.05235988
      PathPoint P1: pelvis (-0.0683355 -0.109599 0.0257978)
      ConditionalPathPoint P2: tibia_r (-0.0273286 -0.0328108 -0.0388174) range=(-0.436332 0.174533)
          coordinate=knee_angle_r
      PathPoint P3: tibia_r (-0.0199847 -0.0530012 -0.0368221)
      PathPoint P4: tibia_r (0.0061713 -0.0859868 -0.023451)
    Thelen2003Muscle glut_max1_r: max_isometric_force=573 optimal_fiber_length=0.1361335 tendon_slack_length=0.1198358
        pennation_angle_at_optimal=0.08726646
      PathPoint P1: pelvis (-0.110338 0.0565077 0.064633)
      PathPoint P2: pelvis (-0.119202 0.00110799 0.081807)
      PathPoint P3: femur_r (-0.0468226 -0.0254092 0.0401629)
      PathPoint P4: femur_r (-0.0283804 -0.0579904 0.0481546)
    Thelen2003Muscle glut_max2_r: max_isometric_force=819 optimal_fiber_length=0.1429617 tendon_slack_length=0.1235111
        pennation_angle_at_optimal=0
      PathPoint P1: pelvis (-0.124557 0.0162506 0.0519834)
      PathPoint P2: pelvis (-0.12705 -0.0480131 0.0843923)
      PathPoint P3: femur_r (-0.0436465 -0.054302 0.0300198)
      PathPoint P4: femur_r (-0.0159832 -0.104096 0.0429293)
    Thelen2003Muscle glut_max3_r: max_isometric_force=552 optimal_fiber_length=0.1401576 tendon_slack_length=0.1411309
        pennation_angle_at_optimal=0.08726646
      PathPoint P1: pelvis (-0.14367 -0.0289926 0.00535531)
      PathPoint P2: pelvis (-0.141177 -0.0971342 0.0372102)
      PathPoint P3: femur_r (-0.0306345 -0.106657 0.0138316)
      PathPoint P4: femur_r (-0.00614739 -0.145386 0.0421096)
    Thelen2003Muscle iliacus_r: max_isometric_force=1073 optimal_fiber_length=0.095386 tendon_slack_length=0.095386
        pennation_angle_at_optimal=0.1221731
      PathPoint P1: pelvis (-0.0622323 0.0337015 0.0788523)
      PathPoint P2: pelvis (-0.0238218 -0.0507831 0.0748819)
      ConditionalPathPoint P3: pelvis (-0.0265919 -0.0743279 0.0753436) range=(-1.5708 0.785398)
          coordinate=hip_flexion_r
      PathPoint P4: femur_r (0.00174176 -0.0556339 0.00584002)
      PathPoint P5: femur_r (-0.0197741 -0.0636255 0.0132169)
    Thelen2003Muscle psoas_r: max_isometric_force=1113 optimal_fiber_length=0.09456861 tendon_slack_length=0.1513098
        pennation_angle_at_optimal=0.1396263
      PathPoint P1: pelvis (-0.0597394 0.0818993 0.0266843)
      PathPoint P2: pelvis (-0.0219752 -0.0526297 0.0700806)
      ConditionalPathPoint P3: pelvis (-0.0265919 -0.0743279 0.0753436) range=(-1.5708 0.785398)
          coordinate=hip_flexion_r
      PathPoint P4: femur_r (0.00163931 -0.0519455 0.00389335)
      PathPoint P5: femur_r (-0.0192618 -0.0611665 0.0106554)
    Thelen2003Muscle quad_fem_r: max_isometric_force=381 optimal_fiber_length=0.05210925 tendon_slack_length=0.02315967
        pennation_angle_at_optimal=0
      PathPoint P1: pelvis (-0.105536 -0.106275 0.0480131)
      PathPoint P2: femur_r (-0.039036 -0.0367819 0.037499)
    Thelen2003Muscle gem_r: max_isometric_force=164 optimal_fiber_length=0.02339857 tendon_slack_length=0.03802267
        pennation_angle_at_optimal=0
      PathPoint P1: pelvis (-0.104613 -0.0757129 0.0659257)
      PathPoint P2: femur_r (-0.0145489 -0.00338106 0.0453882)
    Thelen2003Muscle peri_r: max_isometric_force=444 optimal_fiber_length=0.02457478 tendon_slack_length=0.1086961
        pennation_angle_at_optimal=0.1745329
      PathPoint P1: pelvis (-0.128896 0.000276999 0.0216982)
      PathPoint P2: pelvis (-0.110153 -0.0254838 0.0606627)
      PathPoint P3: femur_r (-0.0151635 -0.00368844 0.0447735)
    Thelen2003Muscle rect_fem_r: max_isometric_force=1169 optimal_fiber_length=0.1158385 tendon_slack_length=0.3149996
        pennation_angle_at_optimal=0.08726646
      PathPoint P1: pelvis (-0.0272382 -0.0287156 0.0893783)
      ConditionalPathPoint P2: femur_r (0.0342205 -0.4129 0.00194667) range=(-2.61799 -1.45997) coordinate=knee_angle_r
      MovingPathPoint P3: tibia_r (0.0584766 0.0227841 0.00143997) x_coordinate=knee_angle_r y_coordinate=knee_angle_r
          z_coordinate=knee_angle_r
        x_location: MultiplierFunction: scale=1.02855
          SimmSpline: x=(-2.0944 -1.99997 -1.5708 -1.45752 -1.39626 -1.0472 -0.698132 -0.526391 -0.349066 -0.174533 0 0.00017453 0.00034907 0.0279253 0.0872665 0.174533 2.0944)
              y=(0.0155805 0.0179938 0.0275081 0.0296564 0.0307615 0.0365695 0.0422074 0.0450902 0.048391 0.0534299 0.0617576 0.0617669 0.0617762 0.0633083 0.066994 0.0733035 0.0573481)
        y_location: MultiplierFunction: scale=1.02855
          SimmSpline: x=(-2.0944 -1.99997 -1.5708 -1.45752 -1.39626 -1.0472 -0.698132 -0.526391 -0.349066 -0.174533 0 0.00017453 0.00034907 0.0279253 0.0872665 0.174533 2.0944)
              y=(0.0234116 0.0237613 0.0251141 0.0252795 0.0253146 0.0249184 0.0242373 0.0238447 0.0234197 0.0227644 0.020984 0.0209814 0.0209788 0.0205225 0.0191754 0.0159554 -0.0673774)
        z_location: MultiplierFunction: scale=1.02855
          SimmSpline: x=(-2.0944 0.1745) y=(0.0014 0.0014)
    Thelen2003Muscle vas_med_r: max_isometric_force=1294 optimal_fiber_length=0.09116574 tendon_slack_length=0.1290661
        pennation_angle_at_optimal=0.08726646
      PathPoint P1: femur_r (0.0143439 -0.215056 0.0192618)
      PathPoint P2: femur_r (0.0364745 -0.283702 0.000922108)
      ConditionalPathPoint P3: femur_r (0.0379089 -0.414744 -0.012807) range=(-2.61799 -1.21004)
          coordinate=knee_angle_r
      ConditionalPathPoint P4: femur_r (0.0280731 -0.435952 -0.0134218) range=(-2.61799 -1.78006)
          coordinate=knee_angle_r
      MovingPathPoint P5: tibia_r (0.0524536 0.0230184 -0.0150168) x_coordinate=knee_angle_r y_coordinate=knee_angle_r
          z_coordinate=knee_angle_r
        x_location: MultiplierFunction: scale=1.02855
          SimmSpline: x=(-2.0944 -1.99997 -1.5708 -1.45752 -1.39626 -1.0472 -0.698132 -0.526391 -0.349066 -0.174533 0 0.00017453 0.00034907 0.0279253 0.0872665 0.174533 2.0944)
              y=(0.00981097 0.0122243 0.0217371 0.0238851 0.0249902 0.0307959 0.0364187 0.0392871 0.0425654 0.0475764 0.0559586 0.0559681 0.0559776 0.0575419 0.0613368 0.0679503 0.0629332)
        y_location: MultiplierFunction: scale=1.02855
          SimmSpline: x=(-2.0944 -1.99997 -1.5708 -1.45752 -1.39626 -1.0472 -0.698132 -0.526391 -0.349066 -0.174533 0 0.00017453 0.00034907 0.0279253 0.0872665 0.174533 2.0944)
              y=(0.0224154 0.0227651 0.0241265 0.0242933 0.0243287 0.0239462 0.0233593 0.0230677 0.0228342 0.0226362 0.0217917 0.0217903 0.0217889 0.0215365 0.0206842 0.0183269 -0.0656205)
        z_location: MultiplierFunction: scale=1.02855
          SimmSpline: x=(-2.0944 2.0944) y=(-0.0146 -0.0146)
    Thelen2003Muscle vas_int_r: max_isometric_force=1365 optimal_fiber_length=0.08910061 tendon_slack_length=0.1392837
        pennation_angle_at_optimal=0.05235988
      PathPoint P1: femur_r (0.0297124 -0.197126 0.0317615)
      PathPoint P2: femur_r (0.034323 -0.213519 0.0292001)
      ConditionalPathPoint P3: femur_r (0.0351425 -0.4129 0.00563511) range=(-2.61799 -1.42) coordinate=knee_angle_r
      MovingPathPoint P4: tibia_r (0.0515737 0.0265321 0.00185139) x_coordinate=knee_angle_r y_coordinate=knee_angle_r
          z_coordinate=knee_angle_r
        x_location: MultiplierFunction: scale=1.02855
          SimmSpline: x=(-2.0944 -1.99997 -1.5708 -1.45752 -1.39626 -1.0472 -0.698132 -0.526391 -0.349066 -0.174533 0 0.00017453 0.00034907 0.0279253 0.0872665 0.174533 2.0944)
              y=(0.0082733 0.0106866 0.0202042 0.022353 0.0234583 0.0292715 0.0349465 0.037871 0.0412569 0.0465287 0.0554632 0.0554735 0.0554837 0.0571717 0.061272 0.0684368 0.0648818)
        y_location: MultiplierFunction: scale=1.02855
          SimmSpline: x=(-2.0944 -1.99997 -1.5708 -1.45752 -1.39626 -1.0472 -0.698132 -0.526391 -0.349066 -0.174533 0 0.00017453 0.00034907 0.0279253 0.0872665 0.174533 2.0944)
              y=(0.025599 0.0259487 0.0273124 0.0274796 0.0275151 0.0271363 0.0265737 0.0263073 0.0261187 0.0260129 0.0252923 0.0252911 0.0252898 0.0250526 0.0242191 0.0218288 -0.0685706)
        z_location: MultiplierFunction: scale=1.02855
          SimmSpline: x=(-2.0944 2.0944) y=(0.0018 0.0018)
    Thelen2003Muscle vas_lat_r: max_isometric_force=1871 optimal_fiber_length=0.08605021 tendon_slack_length=0.1608319
        pennation_angle_at_optimal=0.08726646
      PathPoint P1: femur_r (0.00491791 -0.189954 0.0357573)
      PathPoint P2: femur_r (0.0275608 -0.265465 0.0419047)
      ConditionalPathPoint P3: femur_r (0.0369868 -0.4129 0.0210036) range=(-2.61799 -1.21004) coordinate=knee_angle_r
      ConditionalPathPoint P4: femur_r (0.0259215 -0.434723 0.018852) range=(-2.61799 -1.92004) coordinate=knee_angle_r
      MovingPathPoint P5: tibia_r (0.0567805 0.0211654 0.0169711) x_coordinate=knee_angle_r y_coordinate=knee_angle_r
          z_coordinate=knee_angle_r
        x_location: MultiplierFunction: scale=1.02855
          SimmSpline: x=(-2.0944 -1.99997 -1.5708 -1.45752 -1.39626 -1.0472 -0.698132 -0.526391 -0.349066 -0.174533 0 0.00017453 0.00034907 0.0279253 0.0872665 0.174533 2.0944)
              y=(0.0142897 0.016703 0.0262145 0.0283623 0.0294674 0.0352709 0.0408785 0.0437291 0.0469704 0.0518742 0.0599557 0.0599647 0.0599738 0.0614577 0.0650351 0.0711867 0.0583766)
        y_location: MultiplierFunction: scale=1.02855
          SimmSpline: x=(-2.0944 -1.99997 -1.5708 -1.45752 -1.39626 -1.0472 -0.698132 -0.526391 -0.349066 -0.174533 0 0.00017453 0.00034907 0.0279253 0.0872665 0.174533 2.0944)
              y=(0.0215318 0.0218815 0.0232362 0.0234019 0.0234371 0.0230439 0.0223842 0.0220151 0.0216359 0.0210971 0.0195864 0.0195842 0.019582 0.01919 0.018008 0.0151073 -0.0653421)
        z_location: MultiplierFunction: scale=1.02855
          SimmSpline: x=(-2.0944 2.0944) y=(0.0165 0.0165)
    Thelen2003Muscle med_gas_r: max_isometric_force=1558 optimal_fiber_length=0.06148415 tendon_slack_length=0.399647
        pennation_angle_at_optimal=0.296706
      PathPoint P1: femur_r (-0.0194667 -0.402552 -0.0240772)
      ConditionalPathPoint P2: femur_r (-0.0307369 -0.41208 -0.0264338) range=(-0.785398 0.174533)
          coordinate=knee_angle_r
      PathPoint P3: calcn_r (0 0.0279775 -0.00478325)
    Thelen2003Muscle lat_gas_r: max_isometric_force=683 optimal_fiber_length=0.06558881 tendon_slack_length=0.3894336
        pennation_angle_at_optimal=0.1396263
      PathPoint P1: femur_r (-0.0225404 -0.404293 0.0278682)
      ConditionalPathPoint P2: femur_r (-0.0307369 -0.41167 0.0280731) range=(-0.785398 0.174533)
          coordinate=knee_angle_r
      PathPoint P3: calcn_r (0 0.0279775 -0.00478325)
    Thelen2003Muscle soleus_r: max_isometric_force=3549 optimal_fiber_length=0.05103664 tendon_slack_length=0.2551832
        pennation_angle_at_optimal=0.4363323
      PathPoint P1: tibia_r (-0.00246852 -0.157676 0.00730271)
      PathPoint P2: calcn_r (0 0.0279775 -0.00478325)
    Thelen2003Muscle tib_post_r: max_isometric_force=1588 optimal_fiber_length=0.03138586 tendon_slack_length=0.3138586
        pennation_angle_at_optimal=0.2094395
      PathPoint P1: tibia_r (-0.00966836 -0.138649 0.00195425)
      PathPoint P2: tibia_r (-0.0148111 -0.416665 -0.0235538)
      PathPoint P3: calcn_r (0.0376342 0.0301435 -0.0258115)
      PathPoint P4: calcn_r (0.069673 0.0143498 -0.0253602)
    Thelen2003Muscle flex_dig_r: max_isometric_force=310 optimal_fiber_length=0.03296141 tendon_slack_length=0.3877813
        pennation_angle_at_optimal=0.1221731
      PathPoint P1: tibia_r (-0.00853696 -0.210441 -0.00185139)
      PathPoint P2: tibia_r (-0.0158397 -0.416665 -0.0201595)
      PathPoint P3: calcn_r (0.039349 0.0284287 -0.02527)
      PathPoint P4: calcn_r (0.063897 0.015884 -0.0237358)
      PathPoint P5: calcn_r (0.149635 -0.00731025 0.010469)
      PathPoint P6: toes_r (-0.00171475 -0.0070395 0.0132667)
      PathPoint P7: toes_r (0.0257212 -0.00640775 0.0194037)
      PathPoint P8: toes_r (0.0398003 -0.005415 0.0218405)
    Thelen2003Muscle flex_hal_r: max_isometric_force=322 optimal_fiber_length=0.0414706 tendon_slack_length=0.3664844
        pennation_angle_at_optimal=0.1745329
      PathPoint P1: tibia_r (-0.00812555 -0.240063 0.0250966)
      PathPoint P2: tibia_r (-0.019131 -0.419545 -0.0178968)
      PathPoint P3: calcn_r (0.0337535 0.024909 -0.0217502)
      PathPoint P4: calcn_r (0.0936795 0.006137 -0.023104)
      PathPoint P5: calcn_r (0.155772 -0.00478325 -0.0242773)
      PathPoint P6: toes_r (0.0139887 -0.005776 -0.0239163)
      PathPoint P7: toes_r (0.0507205 -0.0092055 -0.0163352)
    Thelen2003Muscle tib_ant_r: max_isometric_force=905 optimal_fiber_length=0.09858823 tendon_slack_length=0.2243385
        pennation_angle_at_optimal=0.08726646
      PathPoint P1: tibia_r (0.018411 -0.167037 0.0118283)
      PathPoint P2: tibia_r (0.0338393 -0.40638 -0.0182053)
      PathPoint P3: calcn_r (0.105231 0.0160645 -0.0275262)
    Thelen2003Muscle per_brev_r: max_isometric_force=435 optimal_fiber_length=0.05039304 tendon_slack_length=0.1622656
        pennation_angle_at_optimal=0.08726646
      PathPoint P1: tibia_r (-0.00719985 -0.272154 0.0334279)
      PathPoint P2: tibia_r (-0.0203653 -0.430345 0.029108)
      PathPoint P3: tibia_r (-0.0148111 -0.441762 0.029725)
      PathPoint P4: calcn_r (0.0425077 0.0243675 0.0210282)
      PathPoint P5: calcn_r (0.0610992 0.0197648 0.0309558)
    Thelen2003Muscle per_long_r: max_isometric_force=943 optimal_fiber_length=0.04868726 tendon_slack_length=0.342798
        pennation_angle_at_optimal=0.1745329
      PathPoint P1: tibia_r (0.000514275 -0.161277 0.0372336)
      PathPoint P2: tibia_r (-0.021291 -0.432505 0.0294166)
      PathPoint P3: tibia_r (-0.0166625 -0.444231 0.029725)
      PathPoint P4: calcn_r (0.0395295 0.0207575 0.0199452)
      PathPoint P5: calcn_r (0.0614603 0.0095665 0.025631)
      PathPoint P6: calcn_r (0.076893 0.00622725 0.0106495)
      PathPoint P7: calcn_r (0.108571 0.00767125 -0.016606)
    Thelen2003Muscle per_tert_r: max_isometric_force=180 optimal_fiber_length=0.07892549 tendon_slack_length=0.09990569
        pennation_angle_at_optimal=0.2268928
      PathPoint P1: tibia_r (0.00102855 -0.288406 0.0237595)
      PathPoint P2: tibia_r (0.0235538 -0.418517 0.0163539)
      PathPoint P3: calcn_r (0.0773443 0.020577 0.0269847)
    Thelen2003Muscle ext_dig_r: max_isometric_force=512 optimal_fiber_length=0.1002717 tendon_slack_length=0.3391544
        pennation_angle_at_optimal=0.1396263
      PathPoint P1: tibia_r (0.00329136 -0.142042 0.028388)
      PathPoint P2: tibia_r (0.029725 -0.41214 0.00740556)
      PathPoint P3: calcn_r (0.0832105 0.035017 -9.025e-5)
      PathPoint P4: calcn_r (0.145844 0.00496375 0.0117325)
      PathPoint P5: toes_r (0.00027075 0.00424175 0.0138082)
      PathPoint P6: toes_r (0.0399807 -0.000361 0.0225625)
    Thelen2003Muscle ext_hal_r: max_isometric_force=162 optimal_fiber_length=0.108494 tendon_slack_length=0.2981142
        pennation_angle_at_optimal=0.1047198
      PathPoint P1: tibia_r (0.00123426 -0.181745 0.023451)
      PathPoint P2: tibia_r (0.0335307 -0.409877 -0.00874267)
      PathPoint P3: calcn_r (0.0875425 0.0351073 -0.0190428)
      PathPoint P4: calcn_r (0.116693 0.0278872 -0.0231943)
      PathPoint P5: calcn_r (0.156493 0.0125447 -0.02527)
      PathPoint P6: toes_r (0.0268945 0.00370025 -0.0221112)
      PathPoint P7: toes_r (0.0508107 0.0030685 -0.0167865)
    Thelen2003Muscle glut_med1_l: max_isometric_force=819 optimal_fiber_length=0.05070646
        tendon_slack_length=0.07392718 pennation_angle_at_optimal=0.1396263
      PathPoint P1: pelvis (-0.0376718 0.0280692 -0.11163)
      PathPoint P2: femur_l (-0.0223355 -0.0119874 -0.0568634)
    Thelen2003Muscle glut_med2_l: max_isometric_force=573 optimal_fiber_length=0.08012407
        tendon_slack_length=0.05025534 pennation_angle_at_optimal=0
      PathPoint P1: pelvis (-0.0789447 0.0410882 -0.070727)
      PathPoint P2: femur_l (-0.0264338 -0.00594248 -0.0539946)
    Thelen2003Muscle glut_med3_l: max_isometric_force=653 optimal_fiber_length=0.06157381
        tendon_slack_length=0.05051721 pennation_angle_at_optimal=0.3316126
      PathPoint P1: pelvis (-0.112923 0.00969495 -0.0598317)
      PathPoint P2: femur_l (-0.0316591 -0.00481546 -0.0530725)
    Thelen2003Muscle glut_min1_l: max_isometric_force=270 optimal_fiber_length=0.06576257
        tendon_slack_length=0.01547355 pennation_angle_at_optimal=0.1745329
      PathPoint P1: pelvis (-0.0431195 -0.00738663 -0.0975035)
      PathPoint P2: femur_l (-0.00737687 -0.0106554 -0.0573757)
    Thelen2003Muscle glut_min2_l: max_isometric_force=285 optimal_fiber_length=0.05440885
        tendon_slack_length=0.02526125 pennation_angle_at_optimal=0
      PathPoint P1: pelvis (-0.0584467 -0.00600164 -0.0915019)
      PathPoint P2: femur_l (-0.00983583 -0.0106554 -0.0573757)
    Thelen2003Muscle glut_min3_l: max_isometric_force=323 optimal_fiber_length=0.03693384 tendon_slack_length=0.0495691
        pennation_angle_at_optimal=0.01745329
      PathPoint P1: pelvis (-0.0770056 -0.00581697 -0.079037)
      PathPoint P2: femur_l (-0.0138316 -0.00850389 -0.0563511)
    Thelen2003Muscle semimem_l: max_isometric_force=1288 optimal_fiber_length=0.08260458 tendon_slack_length=0.370688
        pennation_angle_at_optimal=0.2617994
      PathPoint P1: pelvis (-0.110061 -0.0899969 -0.0660272)
      ConditionalPathPoint P2: tibia_l (-0.0357935 -0.0361947 0.0194499) range=(-0.558505 0.174533)
          coordinate=knee_angle_l
      PathPoint P3: tibia_l (-0.0277708 -0.0490721 0.0201287)
    Thelen2003Muscle semiten_l: max_isometric_force=410 optimal_fiber_length=0.2080135 tendon_slack_length=0.2644151
        pennation_angle_at_optimal=0.08726646
      PathPoint P1: pelvis (-0.116662 -0.101455 -0.0557598)
      ConditionalPathPoint P2: tibia_l (-0.0432299 -0.0294063 0.0234201) range=(-0.331613 0.174533)
          coordinate=knee_angle_l
      PathPoint P3: tibia_l (-0.0341684 -0.054328 0.0235332)
      PathPoint P4: tibia_l (-0.0116226 -0.0767298 0.0251995)
      PathPoint P5: tibia_l (0.00277708 -0.0983294 0.0198511)
    Thelen2003Muscle bifemlh_l: max_isometric_force=896 optimal_fiber_length=0.1125859 tendon_slack_length=0.3367249
        pennation_angle_at_optimal=0
      PathPoint P1: pelvis (-0.116302 -0.0947059 -0.0641159)
      PathPoint P2: tibia_l (-0.0309594 -0.0370278 -0.0302702)
      PathPoint P3: tibia_l (-0.024068 -0.0579074 -0.0352793)
    Thelen2003Muscle bifemsh_l: max_isometric_force=804 optimal_fiber_length=0.1774274 tendon_slack_length=0.0912777
        pennation_angle_at_optimal=0.4014257
      PathPoint P1: femur_l (0.00512282 -0.216286 -0.0239748)
      PathPoint P2: tibia_l (-0.0309594 -0.0370278 -0.0302702)
      PathPoint P3: tibia_l (-0.024068 -0.0579074 -0.0352793)
    Thelen2003Muscle sar_l: max_isometric_force=156 optimal_fiber_length=0.525916 tendon_slack_length=0.1011377
        pennation_angle_at_optimal=0
      PathPoint P1: pelvis (-0.0141269 -0.00120033 -0.114677)
      PathPoint P2: femur_l (-0.00307369 -0.365564 0.0431342)
      PathPoint P3: tibia_l (-0.00575988 -0.0430962 0.0410392)
      PathPoint P4: tibia_l (0.0061713 -0.0605816 0.0393934)
      PathPoint P5: tibia_l (0.0249938 -0.0863982 0.0259194)
    Thelen2003Muscle add_long_l: max_isometric_force=627 optimal_fiber_length=0.140301 tendon_slack_length=0.1118342
        pennation_angle_at_optimal=0.1047198
      PathPoint P1: pelvis (-0.0291772 -0.0771902 -0.0156042)
      PathPoint P2: femur_l (0.00512282 -0.216286 -0.0239748)
    Thelen2003Muscle add_brev_l: max_isometric_force=429 optimal_fiber_length=0.1333275 tendon_slack_length=0.02004925
        pennation_angle_at_optimal=0
      PathPoint P1: pelvis (-0.0541994 -0.0844846 -0.0151426)
      PathPoint P2: femur_l (0.000922108 -0.122538 -0.0301222)
    Thelen2003Muscle add_mag1_l: max_isometric_force=381 optimal_fiber_length=0.08817469 tendon_slack_length=0.06081013
        pennation_angle_at_optimal=0.08726646
      PathPoint P1: pelvis (-0.0675876 -0.108399 -0.0235448)
      PathPoint P2: femur_l (-0.00461055 -0.124075 -0.0347328)
    Thelen2003Muscle add_mag2_l: max_isometric_force=343 optimal_fiber_length=0.1257598 tendon_slack_length=0.1247205
        pennation_angle_at_optimal=0.05235988
      PathPoint P1: pelvis (-0.0767286 -0.110061 -0.0284386)
      PathPoint P2: femur_l (0.00553266 -0.234113 -0.0232577)
    Thelen2003Muscle add_mag3_l: max_isometric_force=488 optimal_fiber_length=0.135844 tendon_slack_length=0.2582073
        pennation_angle_at_optimal=0.08726646
      PathPoint P1: pelvis (-0.102563 -0.105379 -0.0450769)
      PathPoint P2: femur_l (0.00717195 -0.393126 0.0272534)
    Thelen2003Muscle tfl_l: max_isometric_force=233 optimal_fiber_length=0.09585732 tendon_slack_length=0.4288354
        pennation_angle_at_optimal=0.05235988
      PathPoint P1: pelvis (-0.0287156 0.0197592 -0.114585)
      PathPoint P2: femur_l (0.0301222 -0.101944 -0.0611665)
      PathPoint P3: femur_l (0.00553266 -0.414847 -0.036577)
      PathPoint P4: tibia_l (0.0061713 -0.0500904 -0.0305479)
    Thelen2003Muscle pect_l: max_isometric_force=266 optimal_fiber_length=0.09991782 tendon_slack_length=0.03297288
        pennation_angle_at_optimal=0
      PathPoint P1: pelvis (-0.0397955 -0.0709116 -0.0416422)
      PathPoint P2: femur_l (-0.0124996 -0.0842193 -0.0259215)
    Thelen2003Muscle grac_l: max_isometric_force=162 optimal_fiber_length=0.3650353 tendon_slack_length=0.1306661
        pennation_angle_at_optimal=0.05235988
      PathPoint P1: pelvis (-0.0683355 -0.109599 -0.0257978)
      ConditionalPathPoint P2: tibia_l (-0.0273286 -0.0328108 0.0388174) range=(-0.436332 0.174533)
          coordinate=knee_angle_l
      PathPoint P3: tibia_l (-0.0199847 -0.0530012 0.0368221)
      PathPoint P4: tibia_l (0.0061713 -0.0859868 0.023451)
    Thelen2003Muscle glut_max1_l: max_isometric_force=573 optimal_fiber_length=0.1361335 tendon_slack_length=0.1198358
        pennation_angle_at_optimal=0.08726646
      PathPoint P1: pelvis (-0.110338 0.0565077 -0.064633)
      PathPoint P2: pelvis (-0.119202 0.00110799 -0.081807)
      PathPoint P3: femur_l (-0.0468226 -0.0254092 -0.0401629)
      PathPoint P4: femur_l (-0.0283804 -0.0579904 -0.0481546)
    Thelen2003Muscle glut_max2_l: max_isometric_force=819 optimal_fiber_length=0.1429617 tendon_slack_length=0.1235111
        pennation_angle_at_optimal=0
      PathPoint P1: pelvis (-0.124557 0.0162506 -0.0519834)
      PathPoint P2: pelvis (-0.12705 -0.0480131 -0.0843923)
      PathPoint P3: femur_l (-0.0436465 -0.054302 -0.0300198)
      PathPoint P4: femur_l (-0.0159832 -0.104096 -0.0429293)
    Thelen2003Muscle glut_max3_l: max_isometric_force=552 optimal_fiber_length=0.1401576 tendon_slack_length=0.1411309
        pennation_angle_at_optimal=0.08726646
      PathPoint P1: pelvis (-0.14367 -0.0289926 -0.00535531)
      PathPoint P2: pelvis (-0.141177 -0.0971342 -0.0372102)
      PathPoint P3: femur_l (-0.0306345 -0.106657 -0.0138316)
      PathPoint P4: femur_l (-0.00614739 -0.145386 -0.0421096)
    Thelen2003Muscle iliacus_l: max_isometric_force=1073 optimal_fiber_length=0.095386 tendon_slack_length=0.095386
        pennation_angle_at_optimal=0.1221731
      PathPoint P1: pelvis (-0.0622323 0.0337015 -0.0788523)
      PathPoint P2: pelvis (-0.0238218 -0.0507831 -0.0748819)
      ConditionalPathPoint P3: pelvis (-0.0265919 -0.0743279 -0.0753436) range=(-1.5708 0.785398)
          coordinate=hip_flexion_l
      PathPoint P4: femur_l (0.00174176 -0.0556339 -0.00584002)
      PathPoint P5: femur_l (-0.0197741 -0.0636255 -0.0132169)
    Thelen2003Muscle psoas_l: max_isometric_force=1113 optimal_fiber_length=0.09456861 tendon_slack_length=0.1513098
        pennation_angle_at_optimal=0.1396263
      PathPoint P1: pelvis (-0.0597394 0.0818993 -0.0266843)
      PathPoint P2: pelvis (-0.0219752 -0.0526297 -0.0700806)
      ConditionalPathPoint P3: pelvis (-0.0265919 -0.0743279 -0.0753436) range=(-1.5708 0.785398)
          coordinate=hip_flexion_l
      PathPoint P4: femur_l (0.00163931 -0.0519455 -0.00389335)
      PathPoint P5: femur_l (-0.0192618 -0.0611665 -0.0106554)
    Thelen2003Muscle quad_fem_l: max_isometric_force=381 optimal_fiber_length=0.05210925 tendon_slack_length=0.02315967
        pennation_angle_at_optimal=0
      PathPoint P1: pelvis (-0.105536 -0.106275 -0.0480131)
      PathPoint P2: femur_l (-0.039036 -0.0367819 -0.037499)
    Thelen2003Muscle gem_l: max_isometric_force=164 optimal_fiber_length=0.02339857 tendon_slack_length=0.03802267
        pennation_angle_at_optimal=0
      PathPoint P1: pelvis (-0.104613 -0.0757129 -0.0659257)
      PathPoint P2: femur_l (-0.0145489 -0.00338106 -0.0453882)
    Thelen2003Muscle peri_l: max_isometric_force=444 optimal_fiber_length=0.02457478 tendon_slack_length=0.1086961
        pennation_angle_at_optimal=0.1745329
      PathPoint P1: pelvis (-0.128896 0.000276999 -0.0216982)
      PathPoint P2: pelvis (-0.110153 -0.0254838 -0.0606627)
      PathPoint P3: femur_l (-0.0151635 -0.00368844 -0.0447735)
    Thelen2003Muscle rect_fem_l: max_isometric_force=1169 optimal_fiber_length=0.1158385 tendon_slack_length=0.3149996
        pennation_angle_at_optimal=0.08726646
      PathPoint P1: pelvis (-0.0272382 -0.0287156 -0.0893783)
      ConditionalPathPoint P2: femur_l (0.0342205 -0.4129 -0.00194667) range=(-2.61799 -1.45997)
          coordinate=knee_angle_l
      MovingPathPoint P3: tibia_l (0.0576137 0.0229527 -0.00143997) x_coordinate=knee_angle_l y_coordinate=knee_angle_l
          z_coordinate=knee_angle_l
        x_location: MultiplierFunction: scale=1.02855
          SimmSpline: x=(-2.0944 -1.99997 -1.5708 -1.45752 -1.39626 -1.0472 -0.698132 -0.526391 -0.349066 -0.174533 0 0.00017453 0.00034907 0.0279253 0.0872665 0.174533 2.0944)
              y=(0.0155805 0.0179938 0.0275081 0.0296564 0.0307615 0.0365695 0.0422074 0.0450902 0.048391 0.0534299 0.0617576 0.0617669 0.0617762 0.0633083 0.066994 0.0733035 0.0573481)
        y_location: MultiplierFunction: scale=1.02855
          SimmSpline: x=(-2.0944 -1.99997 -1.5708 -1.45752 -1.39626 -1.0472 -0.698132 -0.526391 -0.349066 -0.174533 0 0.00017453 0.00034907 0.0279253 0.0872665 0.174533 2.0944)
              y=(0.0234116 0.0237613 0.0251141 0.0252795 0.0253146 0.0249184 0.0242373 0.0238447 0.0234197 0.0227644 0.020984 0.0209814 0.0209788 0.0205225 0.0191754 0.0159554 -0.0673774)
        z_location: MultiplierFunction: scale=1.02855
          SimmSpline: x=(-2.0944 0.1745) y=(-0.0014 -0.0014)
    Thelen2003Muscle vas_med_l: max_isometric_force=1294 optimal_fiber_length=0.09116574 tendon_slack_length=0.1290661
        pennation_angle_at_optimal=0.08726646
      PathPoint P1: femur_l (0.0143439 -0.215056 -0.0192618)
      PathPoint P2: femur_l (0.0364745 -0.283702 -0.000922108)
      ConditionalPathPoint P3: femur_l (0.0379089 -0.414744 0.012807) range=(-2.61799 -1.21004) coordinate=knee_angle_l
      ConditionalPathPoint P4: femur_l (0.0280731 -0.435952 0.0134218) range=(-2.61799 -1.78006)
          coordinate=knee_angle_l
      MovingPathPoint P5: tibia_l (0.051589 0.0230941 0.0150168) x_coordinate=knee_angle_l y_coordinate=knee_angle_l
          z_coordinate=knee_angle_l
        x_location: MultiplierFunction: scale=1.02855
          SimmSpline: x=(-2.0944 -1.99997 -1.5708 -1.45752 -1.39626 -1.0472 -0.698132 -0.526391 -0.349066 -0.174533 0 0.00017453 0.00034907 0.0279253 0.0872665 0.174533 2.0944)
              y=(0.00981097 0.0122243 0.0217371 0.0238851 0.0249902 0.0307959 0.0364187 0.0392871 0.0425654 0.0475764 0.0559586 0.0559681 0.0559776 0.0575419 0.0613368 0.0679503 0.0629332)
        y_location: MultiplierFunction: scale=1.02855
          SimmSpline: x=(-2.0944 -1.99997 -1.5708 -1.45752 -1.39626 -1.0472 -0.698132 -0.526391 -0.349066 -0.174533 0 0.00017453 0.00034907 0.0279253 0.0872665 0.174533 2.0944)
              y=(0.0224154 0.0227651 0.0241265 0.0242933 0.0243287 0.0239462 0.0233593 0.0230677 0.0228342 0.0226362 0.0217917 0.0217903 0.0217889 0.0215365 0.0206842 0.0183269 -0.0656205)
        z_location: MultiplierFunction: scale=1.02855
          SimmSpline: x=(-2.0944 2.0944) y=(0.0146 0.0146)
    Thelen2003Muscle vas_int_l: max_isometric_force=1365 optimal_fiber_length=0.08911482 tendon_slack_length=0.1393059
        pennation_angle_at_optimal=0.05235988
      PathPoint P1: femur_l (0.0297124 -0.197126 -0.0317615)
      PathPoint P2: femur_l (0.034323 -0.213519 -0.0292001)
      ConditionalPathPoint P3: femur_l (0.0351425 -0.4129 -0.00563511) range=(-2.61799 -1.42) coordinate=knee_angle_l
      MovingPathPoint P4: tibia_l (0.0576137 0.0229527 -0.00143997) x_coordinate=knee_angle_l y_coordinate=knee_angle_l
          z_coordinate=knee_angle_l
        x_location: MultiplierFunction: scale=1.02855
          SimmSpline: x=(-2.0944 -1.99997 -1.5708 -1.45752 -1.39626 -1.0472 -0.698132 -0.526391 -0.349066 -0.174533 0 0.00017453 0.00034907 0.0279253 0.0872665 0.174533 2.0944)
              y=(0.0155805 0.0179938 0.0275081 0.0296564 0.0307615 0.0365695 0.0422074 0.0450902 0.048391 0.0534299 0.0617576 0.0617669 0.0617762 0.0633083 0.066994 0.0733035 0.0573481)
        y_location: MultiplierFunction: scale=1.02855
          SimmSpline: x=(-2.0944 -1.99997 -1.5708 -1.45752 -1.39626 -1.0472 -0.698132 -0.526391 -0.349066 -0.174533 0 0.00017453 0.00034907 0.0279253 0.0872665 0.174533 2.0944)
              y=(0.0234116 0.0237613 0.0251141 0.0252795 0.0253146 0.0249184 0.0242373 0.0238447 0.0234197 0.0227644 0.020984 0.0209814 0.0209788 0.0205225 0.0191754 0.0159554 -0.0673774)
        z_location: MultiplierFunction: scale=1.02855
          SimmSpline: x=(-2.0944 0.1745) y=(-0.0014 -0.0014)
    Thelen2003Muscle vas_lat_l: max_isometric_force=1871 optimal_fiber_length=0.08605021 tendon_slack_length=0.1608319
        pennation_angle_at_optimal=0.08726646
      PathPoint P1: femur_l (0.00491791 -0.189954 -0.0357573)
      PathPoint P2: femur_l (0.0275608 -0.265465 -0.0419047)
      ConditionalPathPoint P3: femur_l (0.0369868 -0.4129 -0.0210036) range=(-2.61799 -1.21004) coordinate=knee_angle_l
      ConditionalPathPoint P4: femur_l (0.0259215 -0.434723 -0.018852) range=(-2.61799 -1.92004)
          coordinate=knee_angle_l
      MovingPathPoint P5: tibia_l (0.0559417 0.0213088 -0.0169711) x_coordinate=knee_angle_l y_coordinate=knee_angle_l
          z_coordinate=knee_angle_l
        x_location: MultiplierFunction: scale=1.02855
          SimmSpline: x=(-2.0944 -1.99997 -1.5708 -1.45752 -1.39626 -1.0472 -0.698132 -0.526391 -0.349066 -0.174533 0 0.00017453 0.00034907 0.0279253 0.0872665 0.174533 2.0944)
              y=(0.0142897 0.016703 0.0262145 0.0283623 0.0294674 0.0352709 0.0408785 0.0437291 0.0469704 0.0518742 0.0599557 0.0599647 0.0599738 0.0614577 0.0650351 0.0711867 0.0583766)
        y_location: MultiplierFunction: scale=1.02855
          SimmSpline: x=(-2.0944 -1.99997 -1.5708 -1.45752 -1.39626 -1.0472 -0.698132 -0.526391 -0.349066 -0.174533 0 0.00017453 0.00034907 0.0279253 0.0872665 0.174533 2.0944)
              y=(0.0215318 0.0218815 0.0232362 0.0234019 0.0234371 0.0230439 0.0223842 0.0220151 0.0216359 0.0210971 0.0195864 0.0195842 0.019582 0.01919 0.018008 0.0151073 -0.0653421)
        z_location: MultiplierFunction: scale=1.02855
          SimmSpline: x=(-2.0944 2.0944) y=(-0.0165 -0.0165)
    Thelen2003Muscle med_gas_l: max_isometric_force=1558 optimal_fiber_length=0.06148415 tendon_slack_length=0.399647
        pennation_angle_at_optimal=0.296706
      PathPoint P1: femur_l (-0.0194667 -0.402552 0.0240772)
      ConditionalPathPoint P2: femur_l (-0.0307369 -0.41208 0.0264338) range=(-0.785398 0.174533)
          coordinate=knee_angle_l
      PathPoint P3: calcn_l (0 0.0279775 0.00478325)
    Thelen2003Muscle lat_gas_l: max_isometric_force=683 optimal_fiber_length=0.06558881 tendon_slack_length=0.3894336
        pennation_angle_at_optimal=0.1396263
      PathPoint P1: femur_l (-0.0225404 -0.404293 -0.0278682)
      ConditionalPathPoint P2: femur_l (-0.0307369 -0.41167 -0.0280731) range=(-0.785398 0.174533)
          coordinate=knee_angle_l
      PathPoint P3: calcn_l (0 0.0279775 0.00478325)
    Thelen2003Muscle soleus_l: max_isometric_force=3549 optimal_fiber_length=0.05103664 tendon_slack_length=0.2551832
        pennation_angle_at_optimal=0.4363323
      PathPoint P1: tibia_l (-0.00246852 -0.157676 -0.00730271)
      PathPoint P2: calcn_l (0 0.0279775 0.00478325)
    Thelen2003Muscle tib_post_l: max_isometric_force=1588 optimal_fiber_length=0.03138586 tendon_slack_length=0.3138586
        pennation_angle_at_optimal=0.2094395
      PathPoint P1: tibia_l (-0.00966836 -0.138649 -0.00195425)
      PathPoint P2: tibia_l (-0.0148111 -0.416665 0.0235538)
      PathPoint P3: calcn_l (0.0376342 0.0301435 0.0258115)
      PathPoint P4: calcn_l (0.069673 0.0143498 0.0253602)
    Thelen2003Muscle flex_dig_l: max_isometric_force=310 optimal_fiber_length=0.03296141 tendon_slack_length=0.3877813
        pennation_angle_at_optimal=0.1221731
      PathPoint P1: tibia_l (-0.00853696 -0.210441 0.00185139)
      PathPoint P2: tibia_l (-0.0158397 -0.416665 0.0201595)
      PathPoint P3: calcn_l (0.039349 0.0284287 0.02527)
      PathPoint P4: calcn_l (0.063897 0.015884 0.0237358)
      PathPoint P5: calcn_l (0.149635 -0.00731025 -0.010469)
      PathPoint P6: toes_l (-0.00171475 -0.0070395 -0.0132667)
      PathPoint P7: toes_l (0.0257212 -0.00640775 -0.0194037)
      PathPoint P8: toes_l (0.0398003 -0.005415 -0.0218405)
    Thelen2003Muscle flex_hal_l: max_isometric_force=322 optimal_fiber_length=0.0414706 tendon_slack_length=0.3664844
        pennation_angle_at_optimal=0.1745329
      PathPoint P1: tibia_l (-0.00812555 -0.240063 -0.0250966)
      PathPoint P2: tibia_l (-0.019131 -0.419545 0.0178968)
      PathPoint P3: calcn_l (0.0337535 0.024909 0.0217502)
      PathPoint P4: calcn_l (0.0936795 0.006137 0.023104)
      PathPoint P5: calcn_l (0.155772 -0.00478325 0.0242773)
      PathPoint P6: toes_l (0.0139887 -0.005776 0.0239163)
      PathPoint P7: toes_l (0.0507205 -0.0092055 0.0163352)
    Thelen2003Muscle tib_ant_l: max_isometric_force=905 optimal_fiber_length=0.09858823 tendon_slack_length=0.2243385
        pennation_angle_at_optimal=0.08726646
      PathPoint P1: tibia_l (0.018411 -0.167037 -0.0118283)
      PathPoint P2: tibia_l (0.0338393 -0.40638 0.0182053)
      PathPoint P3: calcn_l (0.105231 0.0160645 0.0275262)
    Thelen2003Muscle per_brev_l: max_isometric_force=435 optimal_fiber_length=0.05039304 tendon_slack_length=0.1622656
        pennation_angle_at_optimal=0.08726646
      PathPoint P1: tibia_l (-0.00719985 -0.272154 -0.0334279)
      PathPoint P2: tibia_l (-0.0203653 -0.430345 -0.029108)
      PathPoint P3: tibia_l (-0.0148111 -0.441762 -0.029725)
      PathPoint P4: calcn_l (0.0425077 0.0243675 -0.0210282)
      PathPoint P5: calcn_l (0.0610992 0.0197648 -0.0309558)
    Thelen2003Muscle per_long_l: max_isometric_force=943 optimal_fiber_length=0.04868726 tendon_slack_length=0.342798
        pennation_angle_at_optimal=0.1745329
      PathPoint P1: tibia_l (0.000514275 -0.161277 -0.0372336)
      PathPoint P2: tibia_l (-0.021291 -0.432505 -0.0294166)
      PathPoint P3: tibia_l (-0.0166625 -0.444231 -0.029725)
      PathPoint P4: calcn_l (0.0395295 0.0207575 -0.0199452)
      PathPoint P5: calcn_l (0.0614603 0.0095665 -0.025631)
      PathPoint P6: calcn_l (0.076893 0.00622725 -0.0106495)
      PathPoint P7: calcn_l (0.108571 0.00767125 0.016606)
    Thelen2003Muscle per_tert_l: max_isometric_force=180 optimal_fiber_length=0.07892549 tendon_slack_length=0.09990569
        pennation_angle_at_optimal=0.2268928
      PathPoint P1: tibia_l (0.00102855 -0.288406 -0.0237595)
      PathPoint P2: tibia_l (0.0235538 -0.418517 -0.0163539)
      PathPoint P3: calcn_l (0.0773443 0.020577 -0.0269847)
    Thelen2003Muscle ext_dig_l: max_isometric_force=512 optimal_fiber_length=0.1002717 tendon_slack_length=0.3391544
        pennation_angle_at_optimal=0.1396263
      PathPoint P1: tibia_l (0.00329136 -0.142042 -0.028388)
      PathPoint P2: tibia_l (0.029725 -0.41214 -0.00740556)
      PathPoint P3: calcn_l (0.0832105 0.035017 9.025e-5)
      PathPoint P4: calcn_l (0.145844 0.00496375 -0.0117325)
      PathPoint P5: toes_l (0.00027075 0.00424175 -0.0138082)
      PathPoint P6: toes_l (0.0399807 -0.000361 -0.0225625)
    Thelen2003Muscle ext_hal_l: max_isometric_force=162 optimal_fiber_length=0.108494 tendon_slack_length=0.2981142
        pennation_angle_at_optimal=0.1047198
      PathPoint P1: tibia_l (0.00123426 -0.181745 -0.023451)
      PathPoint P2: tibia_l (0.0335307 -0.409877 0.00874267)
      PathPoint P3: calcn_l (0.0875425 0.0351073 0.0190428)
      PathPoint P4: calcn_l (0.116693 0.0278872 0.0231943)
      PathPoint P5: calcn_l (0.156493 0.0125447 0.02527)
      PathPoint P6: toes_l (0.0268945 0.00370025 0.0221112)
      PathPoint P7: toes_l (0.0508107 0.0030685 0.0167865)
    Thelen2003Muscle ercspn_r: max_isometric_force=2500 optimal_fiber_length=0.1281891 tendon_slack_length=0.03204727
        pennation_angle_at_optimal=0
      PathPoint P1: pelvis (-0.129266 0.0405342 0.0402572)
      PathPoint P2: torso (-0.061333 0.122666 0.026875)
    Thelen2003Muscle ercspn_l: max_isometric_force=2500 optimal_fiber_length=0.1281891 tendon_slack_length=0.03204727
        pennation_angle_at_optimal=0
      PathPoint P1: pelvis (-0.129266 0.0405342 -0.0402572)
      PathPoint P2: torso (-0.061333 0.122666 -0.026875)
    Thelen2003Muscle intobl_r: max_isometric_force=900 optimal_fiber_length=0.105763 tendon_slack_length=0.105763
        pennation_angle_at_optimal=0
      PathPoint P1: pelvis (-0.0369332 0.064633 0.106829)
      PathPoint P2: torso (0.0780601 0.178423 0.0167272)
    Thelen2003Muscle intobl_l: max_isometric_force=900 optimal_fiber_length=0.105763 tendon_slack_length=0.105763
        pennation_angle_at_optimal=0
      PathPoint P1: pelvis (-0.0369332 0.064633 -0.106829)
      PathPoint P2: torso (0.0780601 0.178423 -0.0167272)
    Thelen2003Muscle extobl_r: max_isometric_force=900 optimal_fiber_length=0.1229007 tendon_slack_length=0.1433841
        pennation_angle_at_optimal=0
      PathPoint P1: pelvis (-0.0276999 -0.0587237 0.00923329)
      PathPoint P2: torso (0.0724844 0.122666 0.122666)
    Thelen2003Muscle extobl_l: max_isometric_force=900 optimal_fiber_length=0.1229007 tendon_slack_length=0.1433841
        pennation_angle_at_optimal=0
      PathPoint P1: pelvis (-0.0276999 -0.0587237 -0.00923329)
      PathPoint P2: torso (0.0724844 0.122666 -0.122666)
    HuntCrossleyForce grf_r1: transition_velocity=0.2
      ContactParametersSet contact_parameters:
        ContactParameters: geometry=(platform r_foot_lat_heel) stiffness=4067776 dissipation=2 static_friction=0.8
            dynamic_friction=0.8 viscous_friction=0.5
    HuntCrossleyForce grf_r2: transition_velocity=0.2
      ContactParametersSet contact_parameters:
        ContactParameters: geometry=(platform r_foot_lat_ball1) stiffness=1067776 dissipation=0.1 static_friction=0.8
            dynamic_friction=0.8 viscous_friction=0.5
    HuntCrossleyForce grf_r3: transition_velocity=0.2
      ContactParametersSet contact_parameters:
        ContactParameters: geometry=(platform r_foot_lat_ball2) stiffness=1067776 dissipation=0.1 static_friction=0.8
            dynamic_friction=0.8 viscous_friction=0.5
    HuntCrossleyForce grf_r4: transition_velocity=0.2
      ContactParametersSet contact_parameters:
        ContactParameters: geometry=(platform r_foot_lat_ball3) stiffness=1067776 dissipation=0.1 static_friction=0.8
            dynamic_friction=0.8 viscous_friction=0.5
    HuntCrossleyForce grf_r5: transition_velocity=0.2
      ContactParametersSet contact_parameters:
        ContactParameters: geometry=(platform r_toes_lat_ball1) stiffness=1067776 dissipation=0.1 static_friction=0.8
            dynamic_friction=0.8 viscous_friction=0.5
    HuntCrossleyForce grf_r6: transition_velocity=0.2
      ContactParametersSet contact_parameters:
        ContactParameters: geometry=(platform r_toes_lat_ball2) stiffness=1067776 dissipation=0.1 static_friction=0.8
            dynamic_friction=0.8 viscous_friction=0.5
    HuntCrossleyForce grf_r7: transition_velocity=0.2
      ContactParametersSet contact_parameters:
        ContactParameters: geometry=(platform r_toes_lat_ball3) stiffness=1067776 dissipation=0.1 static_friction=0.8
            dynamic_friction=0.8 viscous_friction=0.5
    HuntCrossleyForce grf_l1: transition_velocity=0.2
      ContactParametersSet contact_parameters:
        ContactParameters: geometry=(platform l_foot_lat_heel) stiffness=4067776 dissipation=2 static_friction=0.8
            dynamic_friction=0.8 viscous_friction=0.5
    HuntCrossleyForce grf_l2: transition_velocity=0.2
      ContactParametersSet contact_parameters:
        ContactParameters: geometry=(platform l_foot_lat_ball1) stiffness=1067776 dissipation=0.1 static_friction=0.8
            dynamic_friction=0.8 viscous_friction=0.5
    HuntCrossleyForce grf_l3: transition_velocity=0.2
      ContactParametersSet contact_parameters:
        ContactParameters: geometry=(platform l_foot_lat_ball2) stiffness=1067776 dissipation=0.1 static_friction=0.8
            dynamic_friction=0.8 viscous_friction=0.5
    HuntCrossleyForce grf_l4: transition_velocity=0.2
      ContactParametersSet contact_parameters:
        ContactParameters: geometry=(platform l_foot_lat_ball3) stiffness=1067776 dissipation=0.1 static_friction=0.8
            dynamic_friction=0.8 viscous_friction=0.5
    HuntCrossleyForce grf_l5: transition_velocity=0.2
      ContactParametersSet contact_parameters:
        ContactParameters: geometry=(platform l_toes_lat_ball1) stiffness=1067776 dissipation=0.1 static_friction=0.8
            dynamic_friction=0.8 viscous_friction=0.5
    HuntCrossleyForce grf_l6: transition_velocity=0.2
      ContactParametersSet contact_parameters:
        ContactParameters: geometry=(platform l_toes_lat_ball2) stiffness=1067776 dissipation=0.1 static_friction=0.8
            dynamic_friction=0.8 viscous_friction=0.5
    HuntCrossleyForce grf_l7: transition_velocity=0.2
      ContactParametersSet contact_parameters:
        ContactParameters: geometry=(platform l_toes_lat_ball3) stiffness=1067776 dissipation=0.1 static_friction=0.8
            dynamic_friction=0.8 viscous_friction=0.5
  MarkerSet:
    Marker RASI: pelvis (0.00923329 0.0230832 0.120951)
    Marker LASI: pelvis (0.00923329 0.0230832 -0.120951)
    Marker CLAV: torso (0.0223029 0.434907 0)
    Marker RSHO: torso (-0.02273 0.444017 0.215258)
    Marker LSHO: torso (-0.02273 0.444017 -0.215258)
    Marker RKNE: femur_r (0 -0.425194 0.0564761)
    Marker RKNEmed: femur_r (0 -0.425194 -0.0521688)
    Marker RTHI: femur_r (0.0740562 -0.190084 0.112463)
    Marker RTHI2: femur_r (0.0189975 -0.202946 0.120801)
    Marker RTHI3: femur_r (0.046982 -0.235083 0.111213)
    Marker RANK: tibia_r (0 -0.431991 0.0565702)
    Marker RANKmed: tibia_r (0 -0.411419 -0.0378547)
    Marker RTIB: tibia_r (0.00551852 -0.223351 0.0881495)
    Marker RTIB2: tibia_r (-0.0477866 -0.22468 0.0916747)
    Marker RTIB3: tibia_r (-0.0199133 -0.27219 0.0878276)
    Marker RTOE: calcn_r (0.16245 0.0225625 0)
    Marker RHEE: calcn_r (-0.0135375 0.030685 0)
    Marker RLatFoot: calcn_r (0.12096 -0.0325805 0.0731457)
    Marker LKNE: femur_l (0 -0.425194 -0.0565396)
    Marker LKNEmed: femur_l (0 -0.425194 0.0565396)
    Marker LTHI: femur_l (0.079432 -0.198908 -0.114902)
    Marker LTHI2: femur_l (0.00612773 -0.189434 -0.131379)
    Marker LTHI3: femur_l (0.0371305 -0.240224 -0.118285)
    Marker LANK: tibia_l (0 -0.431991 -0.0565702)
    Marker LANKmed: tibia_l (0 -0.411419 0.0378547)
    Marker LTIB: tibia_l (0.0162004 -0.214891 -0.0890551)
    Marker LTIB2: tibia_l (-0.0401594 -0.223347 -0.101137)
    Marker LTIB3: tibia_l (-0.00378 -0.266633 -0.0915367)
    Marker LTOE: calcn_l (0.16245 0.0225625 0)
    Marker LHEE: calcn_l (-0.0135375 0.030685 0)
    Marker LLatFoot: calcn_l (0.110681 -0.0376474 -0.0661118)
    Marker RELB: humerus_r (0.00829814 -0.320178 0.0455315)
    Marker LELB: humerus_l (0.00829814 -0.320178 -0.0455315)
    Marker RWRA: radius_r (-0.0109124 -0.250985 0.0491056)
    Marker RWRB: ulna_r (-0.0436494 -0.26517 0.0327371)
    Marker LWRA: radius_l (-0.0109124 -0.250985 -0.0491056)
    Marker LWRB: ulna_l (-0.0436494 -0.264079 -0.0218248)
    Marker RPSI: pelvis (-0.132959 0.0461665 0.0461665)
    Marker LPSI: pelvis (-0.132959 0.0461665 -0.0461665)
    Marker C7: torso (-0.0766443 0.488759 0)
    Marker LFHD: torso (0.0761687 0.747109 -0.0436217)
    Marker RFHD: torso (0.0134448 0.702733 0.0732038)
    Marker LBHD: torso (0.0239011 0.698829 -0.106282)
    Marker LFIN: hand_l (-0.0115259 -0.063175 0)
    Marker RFIN: hand_r (-0.0121561 -0.0594657 0.000712975)
    Marker LUA1: humerus_l (0.036153 -0.228678 -0.0359232)
    Marker LLA1: radius_l (-0.036292 -0.12106 -0.0257328)
    Marker RUA1: humerus_r (0.0121733 -0.209773 0.0542167)
    Marker RLA1: radius_r (-0.0482557 -0.1085 0.0117274)
  ContactGeometrySet ModelContactGeometries:
    ContactHalfSpace platform: body_name=ground location=(0 0 0) orientation=(0 0 -1.570796)
    ContactSphere r_foot_lat_heel: body_name=calcn_r location=(0.03 0.01 0) radius=0.035
    ContactSphere r_foot_lat_ball1: body_name=calcn_r location=(0.175 -0.015 -0.025) radius=0.02
    ContactSphere r_foot_lat_ball2: body_name=calcn_r location=(0.17 -0.015 0.005) radius=0.015
    ContactSphere r_foot_lat_ball3: body_name=calcn_r location=(0.155 -0.014 0.04) radius=0.015
    ContactSphere r_toes_lat_ball1: body_name=toes_r location=(0.053 -0.02 -0.025) radius=0.015
    ContactSphere r_toes_lat_ball2: body_name=toes_r location=(0.04 -0.015 0.01) radius=0.015
    ContactSphere r_toes_lat_ball3: body_name=toes_r location=(0.015 -0.015 0.04) radius=0.015
    ContactSphere l_foot_lat_heel: body_name=calcn_l location=(0.03 0.01 0) radius=0.035
    ContactSphere l_foot_lat_ball1: body_name=calcn_l location=(0.175 -0.015 0.025) radius=0.02
    ContactSphere l_foot_lat_ball2: body_name=calcn_l location=(0.17 -0.015 -0.005) radius=0.015
    ContactSphere l_foot_lat_ball3: body_name=calcn_l location=(0.155 -0.014 -0.04) radius=0.015
    ContactSphere l_toes_lat_ball1: body_name=toes_l location=(0.053 -0.02 0.025) radius=0.015
    ContactSphere l_toes_lat_ball2: body_name=toes_l location=(0.04 -0.015 -0.01) radius=0.015
    ContactSphere l_toes_lat_ball3: body_name=toes_l location=(0.015 -0.015 -0.04) radius=0.015
