# OpenSim document version 30000
InverseKinematicsTool:
  results_directory: ./
  constraint_weight: Inf
  accuracy: 1e-5
  marker_file: ../Static.trc
  time_range: 0.005 6
  report_errors: true
  report_marker_locations: false
  IKTaskSet:
    IKMarkerTask RASI: apply=true weight=10
    IKMarkerTask LASI: apply=true weight=10
    IKMarkerTask CLAV: apply=true weight=10
    IKMarkerTask RSHO: apply=true weight=10
    IKMarkerTask LSHO: apply=true weight=10
    IKMarkerTask RKNE: apply=true weight=10
    IKMarkerTask RKNEmed: apply=true weight=10
    IKMarkerTask RTHI: apply=false weight=1
    IKMarkerTask RANK: apply=true weight=10
    IKMarkerTask RANKmed: apply=true weight=10
    IKMarkerTask RTIB: apply=false weight=1
    IKMarkerTask RTIB2: apply=false weight=1
    IKMarkerTask RTIB3: apply=false weight=1
    IKMarkerTask RTOE: apply=true weight=5
    IKMarkerTask RHEE: apply=true weight=10
    IKMarkerTask LKNE: apply=true weight=10
    IKMarkerTask LKNEmed: apply=true weight=10
    IKMarkerTask LTHI: apply=false weight=1
    IKMarkerTask LTHI2: apply=false weight=1
    IKMarkerTask LTHI3: apply=false weight=1
    IKMarkerTask LANK: apply=true weight=10
    IKMarkerTask LANKmed: apply=true weight=10
    IKMarkerTask LTIB: apply=false weight=1
    IKMarkerTask LTIB2: apply=false weight=1
    IKMarkerTask LTIB3: apply=false weight=1
    IKMarkerTask LTOE: apply=true weight=1
    IKMarkerTask LHEE: apply=true weight=10
    IKMarkerTask RELB: apply=true weight=10
    IKMarkerTask LELB: apply=true weight=10
    IKMarkerTask RWRA: apply=true weight=1
    IKMarkerTask RWRB: apply=true weight=1
    IKMarkerTask LWRA: apply=true weight=1
    IKMarkerTask LWRB: apply=true weight=1
    IKMarkerTask RPSI: apply=true weight=10
    IKMarkerTask LPSI: apply=true weight=10
    IKMarkerTask C7: apply=true weight=10
    IKMarkerTask LFHD: apply=true weight=1
    IKMarkerTask RFHD: apply=true weight=1
    IKMarkerTask LBHD: apply=true weight=1
    IKMarkerTask RBHD: apply=true weight=1
    IKMarkerTask LFIN: apply=true weight=1
    IKMarkerTask RFIN: apply=true weight=1
    IKMarkerTask LUA1: apply=true weight=1
    IKMarkerTask LLA1: apply=true weight=1
    IKMarkerTask RUA1: apply=true weight=1
    IKMarkerTask RLA1: apply=true weight=1
    IKCoordinateTask hip_flexion_r: apply=false weight=10 value_type=manual_value value=0
    IKCoordinateTask hip_rotation_r: apply=true weight=10 value_type=default_value value=0
    IKCoordinateTask ankle_angle_r: apply=true weight=10 value_type=default_value value=0
    IKCoordinateTask hip_flexion_l: apply=false weight=10 value_type=default_value value=0
    IKCoordinateTask hip_rotation_l: apply=true weight=10 value_type=default_value value=0
    IKCoordinateTask ankle_angle_l: apply=true weight=10 value_type=manual_value value=0
